# OpenSim document version 40000
Model Alex:
  gravity: 0 -9.80665 0
  Ground
  BodySet:
    Body thorax: mass=20 [kg] mass_center=(0 -0.1486 0.0591) inertia=(1.29841 0.55245 1.29841 0 0 0)
        meshes=(ground_ribs.vtp ground_spine.vtp ground_skull.vtp ground_jaw.vtp)
      WrapEllipsoid serr_ant: xyz_body_rotation=(0.2 0 0) translation=(0.05 -0.15 0.018) quadrant=all
          dimensions=(0.1 0.2079 0.09)
    Body clavicle_1: mass=0.001 mass_center=(0 0 0) inertia=(1 1 1 0 0 0)
    Body clavicle_2: mass=0.001 mass_center=(0 0 0) inertia=(1 1 1 0 0 0)
    Body clavicle_r: mass=0.156 mass_center=(0.0983 0.0167 0.0042)
        inertia=(6.4e-6 2.63e-5 2.43e-5 -6.7e-6 -9.5e-6 2.9e-6) meshes=rclavicle.vtp
    Body scapula_1: mass=0.001 mass_center=(0 0 0) inertia=(1 1 1 0 0 0)
    Body scapula_2: mass=0.001 mass_center=(0 0 0) inertia=(1 1 1 0 0 0)
    Body scapula_r: mass=0.7054 mass_center=(-0.053 -0.0229 -0.0247) inertia=(0.001 0.001 0.001 0 0 0)
        meshes=rscapula.vtp
      WrapEllipsoid trap: xyz_body_rotation=(-0.15 0 -0.6) translation=(-0.08 -0.04 -0.02) quadrant=all
          dimensions=(0.06 0.1 0.03)
    Body humerus_1: mass=0.001 mass_center=(0 0 0) inertia=(1 1 1 0 0 0)
    Body humerus_2: mass=0.001 mass_center=(0 0 0) inertia=(1 1 1 0 0 0)
    Body humerus_r: mass=2.0519 mass_center=(0.0064 -0.0776 -0.0036) inertia=(0.0132 0.001988 0.0132 0 0 0)
        meshes=rhumerus.vtp
      WrapEllipsoid elbow_circ: xyz_body_rotation=(-0.8 0 0) translation=(0 -0.15 0.13) quadrant=all
          dimensions=(0.15 0.035 0.2)
      WrapSphere deltoid: xyz_body_rotation=(-0.193033 -0.238063 -0.385718) translation=(0.0022 -0.0009 -0.0018)
          quadrant=all radius=0.0272
      WrapSphere inf_sup_sub: xyz_body_rotation=(-0.193033 -0.238063 -0.385718) translation=(-0.0017 0.0018 -0.0013)
          quadrant=all radius=0.028
      WrapCylinder infra_cyl: xyz_body_rotation=(1.56643 0.00610865 -0.953124) translation=(0.0054 -0.023 -0.0044)
          quadrant=-x radius=0.014 length=0.12
      WrapCylinder ter_min_cyl: xyz_body_rotation=(1.56643 0.00610865 -1.47672) translation=(0.0054 -0.023 -0.0044)
          quadrant=-x radius=0.015 length=0.1
      WrapCylinder ter_lat_pec: xyz_body_rotation=(1.56643 0.00610865 -0.953124) translation=(0.0057 -0.073 -0.0042)
          quadrant=all radius=0.01 length=0.1
    Body ulna_r: mass=0.5464 mass_center=(-0.0003 -0.0634 -0.0039) inertia=(0.0030585 0.00045325 0.0030585 0 0 0)
        meshes=ulna.vtp
      WrapCylinder elbow: xyz_body_rotation=(-0.3 0 1.8) translation=(-0.005 -0.02 0) quadrant=all radius=0.03
          length=0.07
      WrapCylinder supinator: xyz_body_rotation=(1.3 -0.1 1.2) translation=(-0.015 -0.03 0.025) quadrant=y radius=0.012
          length=0.2
      WrapCylinder pron_quad: xyz_body_rotation=(1.3 0 1) translation=(-0.005 -0.2 0.06) quadrant=-y radius=0.005
          length=0.1
    Body radius_r: mass=0.5464 mass_center=(0.0106 -0.1179 -0.0129) inertia=(0.0030585 0.00045325 0.0030585 0 0 0)
        meshes=radius.vtp
      WrapCylinder radius: xyz_body_rotation=(-2 0 0) translation=(0.0005 -0.0122 -0.0003) quadrant=-x radius=0.0092
          length=0.1
      WrapCylinder ulna_radius: xyz_body_rotation=(1.2 0 0) translation=(0 -0.04 0.01) quadrant=x radius=0.0071
          length=0.1
    Body rotaxis: mass=0.001 mass_center=(0 0 0) inertia=(1 1 1 0 0 0)
    Body auxprfem: mass=0.001 mass_center=(0 0 0) inertia=(1 1 1 0 0 0)
    Body auxprrud: mass=0.001 mass_center=(0 0 0) inertia=(1 1 1 0 0 0)
    Body auxdrfem: mass=0.001 mass_center=(0 0 0) inertia=(1 1 1 0 0 0)
    Body auxdrrud: mass=0.001 mass_center=(0 0 0) inertia=(1 1 1 0 0 0)
    Body scaphoid: mass=0.004 mass_center=(0 0 0) inertia=(3.9e-5 5.6e-5 6.1e-5 0 0 0) meshes=r_scaph.vtp
    Body lunate: mass=0.002299 mass_center=(0 0 0) inertia=(2.9e-5 3.7e-5 3.5e-5 0 0 0) meshes=r_lun.vtp
    Body trapezium: mass=0.00288 mass_center=(0 0 0) inertia=(4.1e-5 3.4e-5 4.5e-5 0 0 0) meshes=r_trpzm.vtp
    Body trapezoid: mass=0.00169 mass_center=(0 0 0) inertia=(2.4e-5 3.1e-5 2.8e-5 0 0 0) meshes=r_trpzd.vtp
    Body capitate: mass=0.003418707 mass_center=(0 0 0) inertia=(5.5e-5 3.2e-5 6.1e-5 0 0 0) meshes=r_cap.vtp
    Body pisiform: mass=0.004 mass_center=(0 0 0) inertia=(4e-5 4e-5 4e-5 0 0 0) meshes=r_pis.vtp
    Body triquetrum: mass=0.002010716 mass_center=(0 0 0) inertia=(3.4e-5 2.5e-5 3.5e-5 0 0 0) meshes=r_triq.vtp
    Body hamate: mass=0.0033636 mass_center=(0 0 0) inertia=(4.2e-5 4.1e-5 4.8e-5 0 0 0) meshes=r_ham.vtp
    Body carp_metacarp: mass=0.001 mass_center=(0 0 0) inertia=(1 1 1 0 0 0)
    Body metacarpal2: mass=0.0325 mass_center=(0 -0.05 0.01) inertia=(0.0030585 0.00045325 0.0030585 0 0 0)
        meshes=fingers1.vtp
    Body Iphalanx1: mass=0.0067899 mass_center=(0 -0.035 0) inertia=(0.0030585 0.00045325 0.0030585 0 0 0)
        meshes=fingers2.vtp
    Body Iphalanx2: mass=0.001 mass_center=(0 -0.02 0) inertia=(0.0030585 0.00045325 0.0030585 0 0 0)
        meshes=fingers3.vtp
    Body Iphalanx3: mass=0.001 mass_center=(0 -0.01 0) inertia=(0.0030585 0.00045325 0.0030585 0 0 0)
        meshes=fingers4.vtp
    Body metacarpal3: mass=0.003213 mass_center=(0 -0.05 0.01) inertia=(0.0030585 0.00045325 0.0030585 0 0 0)
        meshes=fingers8.vtp
    Body Mphalanx1: mass=0.001 mass_center=(0 -0.035 0) inertia=(0.0030585 0.00045325 0.0030585 0 0 0)
        meshes=movaxesfin76.stl
    Body Mphalanx2: mass=0.001 mass_center=(0 -0.02 0) inertia=(0.0030585 0.00045325 0.0030585 0 0 0)
        meshes=movaxesfin623.stl
    Body Mphalanx3: mass=0.001 mass_center=(0 -0.01 0) inertia=(0.0030585 0.00045325 0.0030585 0 0 0)
        meshes=movaxesfin515.stl
    Body metacarpal4: mass=0.002 mass_center=(0 -0.05 0.01) inertia=(0.0030585 0.00045325 0.0030585 0 0 0)
        meshes=fingers12.vtp
    Body Rphalanx1: mass=0.0067899 mass_center=(0 -0.035 0) inertia=(1 1 1 0 0 0) meshes=movaxesfin117.stl
    Body Rphalanx2: mass=0.001 mass_center=(0 -0.02 0) inertia=(1 1 1 0 0 0) meshes=movaxesfin104.stl
    Body Rphalanx3: mass=0.001 mass_center=(0 -0.01 0) inertia=(1 1 1 0 0 0) meshes=movaxesfin91.stl
    Body metacarpal5: mass=0.0015 mass_center=(0 -0.05 0.01) inertia=(0.0030585 0.00045325 0.0030585 0 0 0)
        meshes=fingers16.vtp
    Body Lphalanx1: mass=0.001 mass_center=(0 -0.035 0) inertia=(0.0030585 0.00045325 0.0030585 0 0 0)
        meshes=movaxesfin158.stl
    Body Lphalanx2: mass=0.001 mass_center=(0 -0.02 0) inertia=(0.0030585 0.00045325 0.0030585 0 0 0)
        meshes=movaxesfin143.stl
    Body Lphalanx3: mass=0.001 mass_center=(0 -0.01 0) inertia=(0.0030585 0.00045325 0.0030585 0 0 0)
        meshes=movaxesfin133.stl
    Body thumb: mass=0.002 mass_center=(0 -0.02 0.02) inertia=(0.0030585 0.00045325 0.0030585 0 0 0)
        meshes=fingers17.vtp
    Body Tphalanx1: mass=0.001 mass_center=(0 -0.02 0) inertia=(0.0030585 0.00045325 0.0030585 0 0 0)
        meshes=fingers18mod61.vtp
    Body Tphalanx2: mass=0.001 mass_center=(0 -0.01 0) inertia=(0.0030585 0.00045325 0.0030585 0 0 0)
        meshes=fingers19mod13-24.vtp
    Body imagine: mass=0.001 mass_center=(0 0 0) inertia=(1 1 1 0 0 0)
    Body table: mass=0.5 mass_center=(0 0 0) inertia=(0.000244 0.000244 0.0002 0 0 0) meshes=table.obj
    Body exo_base: mass=11.61835 mass_center=(-1e-5 0.04574 0.04542)
        inertia=(0.07852352 0.1365001 0.08403451 2.4767e-6 8.306582e-5 0.002682804) meshes=exobase.obj
    Body exobar: mass=1.22753 mass_center=(0.18161 0.28382 0.56785)
        inertia=(0.008544956 0.008558418 0.0008229871 3.485525e-5 1.634424e-5 -0.0007049325) meshes=exobar_1.obj
    Body exobar_2: mass=0.20538 mass_center=(-0.02051 0.10705 0.16692)
        inertia=(0.0004732872 0.0009232319 0.0004799015 -1.322888e-5 7.2188e-6 -8.47181e-6) meshes=exobar_2.obj
    Body exobar_3: mass=0.10428 mass_center=(0.0946 0.04182 0.04724)
        inertia=(9.477047e-5 0.0001412775 0.0001465783 1.605e-8 2.87e-9 -2.63756e-6) meshes=exobar_3.obj
    Body exohand: mass=1.34772 mass_center=(0.26965 0.39189 0.42156)
        inertia=(0.002618103 0.01703101 0.003325106 -0.0001494795 8.178082e-5 7.271704e-5) meshes=exohand_1.obj
    Body exohand_2: mass=0.28653 mass_center=(0.18117 0.35127 0.4673)
        inertia=(0.0002847953 0.000822524 0.001021508 7.62305e-6 8.50775e-6 7.78587e-6) meshes=exohand_2.obj
    Body exohand_3: mass=0.08632 mass_center=(-0.00131 1e-5 0.00727)
        inertia=(0.0001665793 5.090356e-5 0.0002097246 -2.39e-9 9.3177e-7 -1.3e-9) meshes=exohand_3.obj
    Body exohand_4: mass=0.13767 mass_center=(0.12008 0.37406 0.45542)
        inertia=(0.0002460555 4.82492e-5 0.0001716187 -7.268124e-5 -7.79839e-6 2.971031e-5) meshes=exohand_4.obj
    Body exothumbmotor: mass=0.41159 mass_center=(0.06532 0.40975 0.37765)
        inertia=(0.000104229 0.0003856216 0.0003977603 -4.4807e-7 3.705534e-5 -5.912e-8) meshes=exo_thumb_motor.obj
    Body exothumbmotor_2: mass=0.00438 mass_center=(0 0 -0.00084) inertia=(4.3314e-7 4.3256e-7 3.502e-8 0 0 0)
        meshes=exo_thumb_motor_2.obj
    Body exothumb: mass=0.05529 mass_center=(0.11532 0.40464 0.32482)
        inertia=(0.0001146104 6.16339e-5 6.091654e-5 -1.263454e-5 -1.18128e-5 3.782493e-5) meshes=exo_thumb_fix.obj
    Body exofingers: mass=0.11663 mass_center=(-0.04989 0.02902 -0.00202)
        inertia=(0.0001039346 0.0002018931 0.0002721049 2.813049e-5 -9.52105e-6 -6.77767e-6) meshes=exo_fingers_1.obj
    Body exofingers_2: mass=0.062 mass_center=(0.3 0.5 0.2)
        inertia=(4.50705e-5 0.00010067 0.0001441067 1.187624e-5 -9.483e-8 -5.534e-8) meshes=exo_fingers_2.obj
  JointSet:
    WeldJoint base: socket_parent_frame=ground_offset socket_child_frame=thorax_offset
      PhysicalOffsetFrame ground_offset: socket_parent=/ground translation=(0 0.8 0) [meters]
      PhysicalOffsetFrame thorax_offset: socket_parent=/bodyset/thorax translation=(0 0 0)
    WeldJoint sc1: socket_parent_frame=thorax_offset socket_child_frame=clavicle_1_offset
      PhysicalOffsetFrame thorax_offset: socket_parent=/bodyset/thorax translation=(-0.005 0 -0.02)
          orientation=(0 -0.4 0) [radians]
      PhysicalOffsetFrame clavicle_1_offset: socket_parent=/bodyset/clavicle_1 translation=(0 0 0)
    WeldJoint sc2: socket_parent_frame=clavicle_1_offset socket_child_frame=clavicle_2_offset
      PhysicalOffsetFrame clavicle_1_offset: socket_parent=/bodyset/clavicle_1 translation=(0 0 0)
      PhysicalOffsetFrame clavicle_2_offset: socket_parent=/bodyset/clavicle_2 translation=(0 0 0)
    WeldJoint sc3: socket_parent_frame=clavicle_2_offset socket_child_frame=clavicle_r_offset
      PhysicalOffsetFrame clavicle_2_offset: socket_parent=/bodyset/clavicle_2 translation=(0 0 0)
      PhysicalOffsetFrame clavicle_r_offset: socket_parent=/bodyset/clavicle_r translation=(0 0 0)
    WeldJoint ac1: socket_parent_frame=clavicle_r_offset socket_child_frame=scapula_1_offset
      PhysicalOffsetFrame clavicle_r_offset: socket_parent=/bodyset/clavicle_r translation=(0.2 0.015 0.01)
          orientation=(-0.2 0.8 0.1)
      PhysicalOffsetFrame scapula_1_offset: socket_parent=/bodyset/scapula_1 translation=(0 0 0)
    WeldJoint ac2: socket_parent_frame=scapula_1_offset socket_child_frame=scapula_2_offset
      PhysicalOffsetFrame scapula_1_offset: socket_parent=/bodyset/scapula_1 translation=(0 0 0)
      PhysicalOffsetFrame scapula_2_offset: socket_parent=/bodyset/scapula_2 translation=(0 0 0)
    WeldJoint ac3: socket_parent_frame=scapula_2_offset socket_child_frame=scapula_r_offset
      PhysicalOffsetFrame scapula_2_offset: socket_parent=/bodyset/scapula_2 translation=(0 0 0)
      PhysicalOffsetFrame scapula_r_offset: socket_parent=/bodyset/scapula_r translation=(0 0 0)
    CustomJoint gh1: socket_parent_frame=scapula_r_offset socket_child_frame=humerus_1_offset
      Coordinate HU_x: default_value=0.3991466 range=(-0.2 0.9) clamped=true
      PhysicalOffsetFrame scapula_r_offset: socket_parent=/bodyset/scapula_r translation=(0.002 -0.023 -0.0439)
      PhysicalOffsetFrame humerus_1_offset: socket_parent=/bodyset/humerus_1 translation=(0 0 0)
      SpatialTransform: axes_held_at_zero=(rotation2 rotation3 translation1 translation2 translation3)
        TransformAxis rotation1: coordinates=HU_x axis=(1 0 0) LinearFunction(coefficients=1 0)
    CustomJoint gh2: socket_parent_frame=humerus_1_offset socket_child_frame=humerus_2_offset
      Coordinate HU_z: default_value=0.5604233 range=(-0.4 0.75) clamped=false
      PhysicalOffsetFrame humerus_1_offset: socket_parent=/bodyset/humerus_1 translation=(0 0 0)
      PhysicalOffsetFrame humerus_2_offset: socket_parent=/bodyset/humerus_2 translation=(0 0 0)
      SpatialTransform: axes_held_at_zero=(rotation1 rotation2 translation1 translation2 translation3)
        TransformAxis rotation3: coordinates=HU_z axis=(0 0 1) LinearFunction(coefficients=1 0)
    CustomJoint gh3: socket_parent_frame=humerus_2_offset socket_child_frame=humerus_r_offset
      Coordinate HU_yy: default_value=0.08446737 range=(-0.7 0.7) clamped=false
      PhysicalOffsetFrame humerus_2_offset: socket_parent=/bodyset/humerus_2 translation=(0 0 0)
      PhysicalOffsetFrame humerus_r_offset: socket_parent=/bodyset/humerus_r translation=(0 0 0)
      SpatialTransform: axes_held_at_zero=(rotation1 rotation3 translation1 translation2 translation3)
        TransformAxis rotation2: coordinates=HU_yy axis=(0 1 0) LinearFunction(coefficients=1 0)
    CustomJoint hu: socket_parent_frame=humerus_r_offset socket_child_frame=ulna_r_offset
      Coordinate EL_x: default_value=1.29981 range=(0.45 2.2) clamped=false
      PhysicalOffsetFrame humerus_r_offset: socket_parent=/bodyset/humerus_r translation=(0 -0.284 0.005)
          orientation=(1 1 -0.8)
      PhysicalOffsetFrame ulna_r_offset: socket_parent=/bodyset/ulna_r translation=(0 0 0)
      SpatialTransform: axes_held_at_zero=(rotation2 rotation3 translation1 translation2 translation3)
        TransformAxis rotation1: coordinates=EL_x axis=(0 0.4 1) LinearFunction(coefficients=1 0)
    CustomJoint ur: socket_parent_frame=ulna_r_offset socket_child_frame=radius_r_offset
      Coordinate EL_yy: default_value=0.9839468 range=(-0.45 1.5) clamped=false
      PhysicalOffsetFrame ulna_r_offset: socket_parent=/bodyset/ulna_r translation=(-0.0065 -0.008 0.027)
      PhysicalOffsetFrame radius_r_offset: socket_parent=/bodyset/radius_r translation=(0 0 0)
      SpatialTransform: axes_held_at_zero=(rotation1 rotation3 translation1 translation2 translation3)
        TransformAxis rotation2: coordinates=EL_yy axis=(0.05639802 0.9835774 -0.1714491)
            LinearFunction(coefficients=1 0)
    WeldJoint rad-rotaxis: socket_parent_frame=radius_r_offset socket_child_frame=rotaxis_offset
      PhysicalOffsetFrame radius_r_offset: socket_parent=/bodyset/radius_r translation=(-0.0085 -0.2313 0.0561)
          orientation=(-0.261799 0.392699 0)
      PhysicalOffsetFrame rotaxis_offset: socket_parent=/bodyset/rotaxis translation=(0 0 0)
    CustomJoint rotaxis-auxprfem: socket_parent_frame=rotaxis_offset socket_child_frame=auxprfem_offset
      Coordinate WR_x: default_value=-0.3703603 range=(-0.7 0.3) clamped=false
      PhysicalOffsetFrame rotaxis_offset: socket_parent=/bodyset/rotaxis translation=(-0.001 0.009 0)
      PhysicalOffsetFrame auxprfem_offset: socket_parent=/bodyset/auxprfem translation=(0 0 0)
      SpatialTransform: axes_held_at_zero=(rotation1 rotation2 translation1 translation2 translation3)
        TransformAxis rotation3: coordinates=WR_x axis=(0 0 1) LinearFunction(coefficients=1 0)
    CustomJoint auxprfem-auxprrud: socket_parent_frame=auxprfem_offset socket_child_frame=auxprrud_offset
      Coordinate WR_zz: default_value=-0.004607593 range=(-0.6 0.3) clamped=false
      PhysicalOffsetFrame auxprfem_offset: socket_parent=/bodyset/auxprfem translation=(0 0 0)
      PhysicalOffsetFrame auxprrud_offset: socket_parent=/bodyset/auxprrud translation=(0 0 0)
      SpatialTransform: axes_held_at_zero=(rotation2 rotation3 translation1 translation2 translation3)
        TransformAxis rotation1: coordinates=WR_zz axis=(1 0 0)
          SimmSpline: x=(-0.436332 0 0.610865) y=(-0.163625 0 0.305433)
    WeldJoint auxprrud-auxdrfem: socket_parent_frame=auxprrud_offset socket_child_frame=auxdrfem_offset
      PhysicalOffsetFrame auxprrud_offset: socket_parent=/bodyset/auxprrud translation=(0.001 -0.02 0)
      PhysicalOffsetFrame auxdrfem_offset: socket_parent=/bodyset/auxdrfem translation=(0 0 0)
    WeldJoint auxdrfem-auxdrrud: socket_parent_frame=auxdrfem_offset socket_child_frame=auxdrrud_offset
      PhysicalOffsetFrame auxdrfem_offset: socket_parent=/bodyset/auxdrfem translation=(0 0 0)
      PhysicalOffsetFrame auxdrrud_offset: socket_parent=/bodyset/auxdrrud translation=(0 0 0)
    WeldJoint prox-scaph: socket_parent_frame=auxprrud_offset socket_child_frame=scaphoid_offset
      PhysicalOffsetFrame auxprrud_offset: socket_parent=/bodyset/auxprrud translation=(-0.0035 -0.0025 0.009)
          orientation=(0.401426 0 0)
      PhysicalOffsetFrame scaphoid_offset: socket_parent=/bodyset/scaphoid translation=(0 0 0)
    WeldJoint prox-lun: socket_parent_frame=auxprrud_offset socket_child_frame=lunate_offset
      PhysicalOffsetFrame auxprrud_offset: socket_parent=/bodyset/auxprrud translation=(-0.004 -0.0015 -0.007)
      PhysicalOffsetFrame lunate_offset: socket_parent=/bodyset/lunate translation=(0 0 0)
    WeldJoint dist-trpzm: socket_parent_frame=auxdrrud_offset socket_child_frame=trapezium_offset
      PhysicalOffsetFrame auxdrrud_offset: socket_parent=/bodyset/auxdrrud translation=(0.0035 -0.0035 0.02)
          orientation=(-0.261799 0 0)
      PhysicalOffsetFrame trapezium_offset: socket_parent=/bodyset/trapezium translation=(0 0 0)
    WeldJoint dist-trpzd: socket_parent_frame=auxdrrud_offset socket_child_frame=trapezoid_offset
      PhysicalOffsetFrame auxdrrud_offset: socket_parent=/bodyset/auxdrrud translation=(-0.0015 -0.0044 0.0134)
          orientation=(0.349066 -0.174533 0)
      PhysicalOffsetFrame trapezoid_offset: socket_parent=/bodyset/trapezoid translation=(0 0 0)
    WeldJoint dist-cap: socket_parent_frame=auxdrrud_offset socket_child_frame=capitate_offset
      PhysicalOffsetFrame auxdrrud_offset: socket_parent=/bodyset/auxdrrud translation=(-0.0155 -0.0018 -0.0055)
          orientation=(0.174533 0 0)
      PhysicalOffsetFrame capitate_offset: socket_parent=/bodyset/capitate translation=(0 0 0)
    WeldJoint prox-pis: socket_parent_frame=auxprrud_offset socket_child_frame=pisiform_offset
      PhysicalOffsetFrame auxprrud_offset: socket_parent=/bodyset/auxprrud translation=(0.005 -0.015 -0.0201)
      PhysicalOffsetFrame pisiform_offset: socket_parent=/bodyset/pisiform translation=(0 0 0)
    WeldJoint prox-triq: socket_parent_frame=auxprrud_offset socket_child_frame=triquetrum_offset
      PhysicalOffsetFrame auxprrud_offset: socket_parent=/bodyset/auxprrud translation=(-0.0055 -0.01 -0.021)
      PhysicalOffsetFrame triquetrum_offset: socket_parent=/bodyset/triquetrum translation=(0 0 0)
    WeldJoint dist-ham: socket_parent_frame=auxdrrud_offset socket_child_frame=hamate_offset
      PhysicalOffsetFrame auxdrrud_offset: socket_parent=/bodyset/auxdrrud translation=(-0.006 -0.005 -0.0175)
          orientation=(-0.20944 0 0)
      PhysicalOffsetFrame hamate_offset: socket_parent=/bodyset/hamate translation=(0 0 0)
    WeldJoint auxCMC: socket_parent_frame=auxdrrud_offset socket_child_frame=carp_metacarp_offset
      PhysicalOffsetFrame auxdrrud_offset: socket_parent=/bodyset/auxdrrud translation=(0 0 0)
      PhysicalOffsetFrame carp_metacarp_offset: socket_parent=/bodyset/carp_metacarp translation=(0 0 0)
    WeldJoint CMC2: socket_parent_frame=carp_metacarp_offset socket_child_frame=metacarpal2_offset
      PhysicalOffsetFrame carp_metacarp_offset: socket_parent=/bodyset/carp_metacarp
          translation=(-0.0047 -0.0095 -0.005) orientation=(0.174533 0.261799 0)
      PhysicalOffsetFrame metacarpal2_offset: socket_parent=/bodyset/metacarpal2 translation=(0 0 0)
    CustomJoint MCP2: socket_parent_frame=metacarpal2_offset socket_child_frame=Iphalanx1_offset
      Coordinate PIF_zz: default_value=-0.08822639 range=(-0.3490659 0.3490659) clamped=false locked=true
      Coordinate PIF_x: default_value=0.6876248 range=(-0.1745329 1.570796) clamped=false
      PhysicalOffsetFrame metacarpal2_offset: socket_parent=/bodyset/metacarpal2 translation=(-0.002402 -0.0685 0.045)
      PhysicalOffsetFrame Iphalanx1_offset: socket_parent=/bodyset/Iphalanx1 translation=(0 0 0)
      SpatialTransform: axes_held_at_zero=(rotation2 translation1 translation2 translation3)
        TransformAxis rotation1: coordinates=PIF_zz axis=(1 0 0) LinearFunction(coefficients=1 0)
        TransformAxis rotation3: coordinates=PIF_x axis=(0 0 1) LinearFunction(coefficients=1 0)
    CustomJoint PIP: socket_parent_frame=Iphalanx1_offset socket_child_frame=Iphalanx2_offset
      Coordinate MIF_x: default_value=0.3490659 range=(-0.08726646 1.570796) clamped=false locked=true
      PhysicalOffsetFrame Iphalanx1_offset: socket_parent=/bodyset/Iphalanx1 translation=(0.0005 -0.04826 0.00799)
      PhysicalOffsetFrame Iphalanx2_offset: socket_parent=/bodyset/Iphalanx2 translation=(0 0 0)
      SpatialTransform: axes_held_at_zero=(rotation1 rotation2 translation1 translation2 translation3)
        TransformAxis rotation3: coordinates=MIF_x axis=(0 0 1) LinearFunction(coefficients=1 0)
    CustomJoint DIP: socket_parent_frame=Iphalanx2_offset socket_child_frame=Iphalanx3_offset
      Coordinate DIF_x: default_value=0.08575612 range=(-0.08726646 1.570796) clamped=false locked=true
      PhysicalOffsetFrame Iphalanx2_offset: socket_parent=/bodyset/Iphalanx2 translation=(0.00193 -0.03277 0.00472)
      PhysicalOffsetFrame Iphalanx3_offset: socket_parent=/bodyset/Iphalanx3 translation=(0 0 0)
      SpatialTransform: axes_held_at_zero=(rotation1 rotation2 translation1 translation2 translation3)
        TransformAxis rotation3: coordinates=DIF_x axis=(0 0 1) LinearFunction(coefficients=1 0)
    WeldJoint CMC3: socket_parent_frame=carp_metacarp_offset socket_child_frame=metacarpal3_offset
      PhysicalOffsetFrame carp_metacarp_offset: socket_parent=/bodyset/carp_metacarp
          translation=(-0.0047 -0.0085 -0.005) orientation=(0.0872665 0.174533 0.0872665)
      PhysicalOffsetFrame metacarpal3_offset: socket_parent=/bodyset/metacarpal3 translation=(0 0 0)
    CustomJoint MCP2M: socket_parent_frame=metacarpal3_offset socket_child_frame=Mphalanx1_offset
      Coordinate PMF_zz: default_value=0 range=(-0.3490659 0.3490659) clamped=false locked=true
      Coordinate PMF_x: default_value=0.6876248 range=(-0.1745329 1.570796) clamped=false
      PhysicalOffsetFrame metacarpal3_offset: socket_parent=/bodyset/metacarpal3 translation=(-0.005 -0.0785 0.0109)
      PhysicalOffsetFrame Mphalanx1_offset: socket_parent=/bodyset/Mphalanx1 translation=(0 0 0)
      SpatialTransform: axes_held_at_zero=(rotation2 translation1 translation2 translation3)
        TransformAxis rotation1: coordinates=PMF_zz axis=(1 0 0) LinearFunction(coefficients=1 0)
        TransformAxis rotation3: coordinates=PMF_x axis=(0 0 1) LinearFunction(coefficients=1 0)
    CustomJoint MPIP: socket_parent_frame=Mphalanx1_offset socket_child_frame=Mphalanx2_offset
      Coordinate MMF_x: default_value=0.1308997 range=(-0.08726646 1.570796) clamped=false locked=true
      PhysicalOffsetFrame Mphalanx1_offset: socket_parent=/bodyset/Mphalanx1 translation=(-0.0002 -0.0559 0.007)
      PhysicalOffsetFrame Mphalanx2_offset: socket_parent=/bodyset/Mphalanx2 translation=(0 0 0)
      SpatialTransform: axes_held_at_zero=(rotation1 rotation2 translation1 translation2 translation3)
        TransformAxis rotation3: coordinates=MMF_x axis=(0 0 1) LinearFunction(coefficients=1 0)
    CustomJoint MDIP: socket_parent_frame=Mphalanx2_offset socket_child_frame=Mphalanx3_offset
      Coordinate DMF_x: default_value=0.4363323 range=(-0.08726646 1.570796) clamped=false locked=true
      PhysicalOffsetFrame Mphalanx2_offset: socket_parent=/bodyset/Mphalanx2 translation=(0.00243 -0.03397 0.0018)
      PhysicalOffsetFrame Mphalanx3_offset: socket_parent=/bodyset/Mphalanx3 translation=(0 0 0)
      SpatialTransform: axes_held_at_zero=(rotation1 rotation2 translation1 translation2 translation3)
        TransformAxis rotation3: coordinates=DMF_x axis=(0 0 1) LinearFunction(coefficients=1 0)
    WeldJoint CMC4: socket_parent_frame=carp_metacarp_offset socket_child_frame=metacarpal4_offset
      PhysicalOffsetFrame carp_metacarp_offset: socket_parent=/bodyset/carp_metacarp
          translation=(-0.0047 -0.008 -0.0033) orientation=(0.0872665 0.174533 0.0872665)
      PhysicalOffsetFrame metacarpal4_offset: socket_parent=/bodyset/metacarpal4 translation=(0 0 0)
    CustomJoint RCP2M: socket_parent_frame=metacarpal4_offset socket_child_frame=Rphalanx1_offset
      Coordinate PRF_zz: default_value=0 range=(-0.3490659 0.3490659) clamped=false locked=true
      Coordinate PRF_x: default_value=0.6876248 range=(-0.1745329 1.570796) clamped=false
      PhysicalOffsetFrame metacarpal4_offset: socket_parent=/bodyset/metacarpal4 translation=(0 -0.077 -0.0109)
      PhysicalOffsetFrame Rphalanx1_offset: socket_parent=/bodyset/Rphalanx1 translation=(0 0 0)
      SpatialTransform: axes_held_at_zero=(rotation2 translation1 translation2 translation3)
        TransformAxis rotation1: coordinates=PRF_zz axis=(1 0 0) LinearFunction(coefficients=1 0)
        TransformAxis rotation3: coordinates=PRF_x axis=(0 0 1) LinearFunction(coefficients=1 0)
    CustomJoint RPIP: socket_parent_frame=Rphalanx1_offset socket_child_frame=Rphalanx2_offset
      Coordinate MRF_x: default_value=0.5235988 range=(-0.08726646 1.570796) clamped=false locked=true
      PhysicalOffsetFrame Rphalanx1_offset: socket_parent=/bodyset/Rphalanx1 translation=(0.003 -0.0559 0.01)
      PhysicalOffsetFrame Rphalanx2_offset: socket_parent=/bodyset/Rphalanx2 translation=(0 0 0)
      SpatialTransform: axes_held_at_zero=(rotation1 rotation2 translation1 translation2 translation3)
        TransformAxis rotation3: coordinates=MRF_x axis=(0 0 1) LinearFunction(coefficients=1 0)
    CustomJoint RDIP: socket_parent_frame=Rphalanx2_offset socket_child_frame=Rphalanx3_offset
      Coordinate DRF_x: default_value=0.086392 range=(-0.08726646 1.570796) clamped=false locked=true
      PhysicalOffsetFrame Rphalanx2_offset: socket_parent=/bodyset/Rphalanx2 translation=(0.00593 -0.03357 -0.00092)
      PhysicalOffsetFrame Rphalanx3_offset: socket_parent=/bodyset/Rphalanx3 translation=(0 0 0)
      SpatialTransform: axes_held_at_zero=(rotation1 rotation2 translation1 translation2 translation3)
        TransformAxis rotation3: coordinates=DRF_x axis=(0 0 1) LinearFunction(coefficients=1 0)
    WeldJoint CMC5: socket_parent_frame=carp_metacarp_offset socket_child_frame=metacarpal5_offset
      PhysicalOffsetFrame carp_metacarp_offset: socket_parent=/bodyset/carp_metacarp translation=(-0.002 -0.01 0.0035)
          orientation=(0.0872665 0.174533 0.0872665)
      PhysicalOffsetFrame metacarpal5_offset: socket_parent=/bodyset/metacarpal5 translation=(0 0 0)
    CustomJoint LCP2M: socket_parent_frame=metacarpal5_offset socket_child_frame=Lphalanx1_offset
      Coordinate PLF_zz: default_value=0 range=(-0.3490659 0.3490659) clamped=false locked=true
      Coordinate PLF_x: default_value=0.6876248 range=(-0.1745329 1.570796) clamped=false
      PhysicalOffsetFrame metacarpal5_offset: socket_parent=/bodyset/metacarpal5 translation=(0.0015 -0.064 -0.0397)
      PhysicalOffsetFrame Lphalanx1_offset: socket_parent=/bodyset/Lphalanx1 translation=(0 0 0)
      SpatialTransform: axes_held_at_zero=(rotation2 translation1 translation2 translation3)
        TransformAxis rotation1: coordinates=PLF_zz axis=(1 0 0) LinearFunction(coefficients=1 0)
        TransformAxis rotation3: coordinates=PLF_x axis=(0 0 1) LinearFunction(coefficients=1 0)
    CustomJoint LPIP: socket_parent_frame=Lphalanx1_offset socket_child_frame=Lphalanx2_offset
      Coordinate MLF_x: default_value=0.8290314 range=(-0.08726646 1.570796) clamped=false locked=true
      PhysicalOffsetFrame Lphalanx1_offset: socket_parent=/bodyset/Lphalanx1 translation=(0.001 -0.043 -0.008)
      PhysicalOffsetFrame Lphalanx2_offset: socket_parent=/bodyset/Lphalanx2 translation=(0 0 0)
      SpatialTransform: axes_held_at_zero=(rotation1 rotation2 translation1 translation2 translation3)
        TransformAxis rotation3: coordinates=MLF_x axis=(0 0 1) LinearFunction(coefficients=1 0)
    CustomJoint LDIP: socket_parent_frame=Lphalanx2_offset socket_child_frame=Lphalanx3_offset
      Coordinate DLF_x: default_value=0.07548037 range=(-0.08726646 1.570796) clamped=false locked=true
      PhysicalOffsetFrame Lphalanx2_offset: socket_parent=/bodyset/Lphalanx2 translation=(0.002 -0.028 0.004)
      PhysicalOffsetFrame Lphalanx3_offset: socket_parent=/bodyset/Lphalanx3 translation=(0 0 0)
      SpatialTransform: axes_held_at_zero=(rotation1 rotation2 translation1 translation2 translation3)
        TransformAxis rotation3: coordinates=DLF_x axis=(0 0 1) LinearFunction(coefficients=1 0)
    CustomJoint CMC1: socket_parent_frame=carp_metacarp_offset socket_child_frame=thumb_offset
      Coordinate MTF_x: default_value=0.2650534 range=(-2 2) clamped=false locked=true
      Coordinate MTF_y: default_value=1.879508 range=(-4 4) clamped=false locked=true
      Coordinate MTF_z: default_value=-0.9376278 range=(-4 4) clamped=false
      PhysicalOffsetFrame carp_metacarp_offset: socket_parent=/bodyset/carp_metacarp translation=(0.008 -0.0045 0.0219)
          orientation=(0.3 0 0)
      PhysicalOffsetFrame thumb_offset: socket_parent=/bodyset/thumb translation=(0 0 0)
      SpatialTransform: axes_held_at_zero=(translation1 translation2 translation3)
        TransformAxis rotation1: coordinates=MTF_x axis=(1 0 0) LinearFunction(coefficients=1 0)
        TransformAxis rotation2: coordinates=MTF_y axis=(0 1 0) LinearFunction(coefficients=1 0)
        TransformAxis rotation3: coordinates=MTF_z axis=(0 0 1) LinearFunction(coefficients=1 0)
    CustomJoint TCP2M: socket_parent_frame=thumb_offset socket_child_frame=Tphalanx1_offset
      Coordinate PTF_x: default_value=-0.8235988 range=(-1 1.396263) clamped=false locked=true
      PhysicalOffsetFrame thumb_offset: socket_parent=/bodyset/thumb translation=(-0.005 -0.035 0.045)
          orientation=(0 0.5 1)
      PhysicalOffsetFrame Tphalanx1_offset: socket_parent=/bodyset/Tphalanx1 translation=(0 0 0)
      SpatialTransform: axes_held_at_zero=(rotation1 rotation2 translation1 translation2 translation3)
        TransformAxis rotation3: coordinates=PTF_x axis=(0 0.5 0.5) LinearFunction(coefficients=1 0)
    CustomJoint DTF_x: socket_parent_frame=Tphalanx1_offset socket_child_frame=Tphalanx2_offset
      Coordinate DTF_x: default_value=0.1308997 range=(-0.08726646 1.570796) clamped=false locked=true
      PhysicalOffsetFrame Tphalanx1_offset: socket_parent=/bodyset/Tphalanx1 translation=(-0.015 -0.033 0.022)
      PhysicalOffsetFrame Tphalanx2_offset: socket_parent=/bodyset/Tphalanx2 translation=(0 0 0)
      SpatialTransform: axes_held_at_zero=(rotation1 rotation2 translation1 translation2 translation3)
        TransformAxis rotation3: coordinates=DTF_x axis=(0 0.5 0.5) LinearFunction(coefficients=1 0)
    WeldJoint updown: socket_parent_frame=rotaxis_offset socket_child_frame=imagine_offset
      PhysicalOffsetFrame rotaxis_offset: socket_parent=/bodyset/rotaxis translation=(0 0 0)
      PhysicalOffsetFrame imagine_offset: socket_parent=/bodyset/imagine translation=(0 0 0) orientation=(0 0 -1.5708)
    WeldJoint basetable: socket_parent_frame=ground_offset socket_child_frame=table_offset
      PhysicalOffsetFrame ground_offset: socket_parent=/ground translation=(-0.45 -0.67 -1.2)
      PhysicalOffsetFrame table_offset: socket_parent=/bodyset/table translation=(0 0 0)
    CustomJoint exotable1: socket_parent_frame=basetable_offset socket_child_frame=exobase_offset
      Coordinate EM_tz: default_value=-0.3819771 range=(-0.6 0) clamped=false
      PhysicalOffsetFrame basetable_offset: socket_parent=/bodyset/table translation=(0.65 1 0.7)
          orientation=(0 0.18 0)
      PhysicalOffsetFrame exobase_offset: socket_parent=/bodyset/exo_base translation=(0 0 0)
      SpatialTransform: axes_held_at_zero=(rotation1 rotation2 rotation3 translation1 translation2)
        TransformAxis translation3: coordinates=EM_tz axis=(0 0 1) LinearFunction(coefficients=-1 0)
    CustomJoint exobasebar: socket_parent_frame=exobase_offset socket_child_frame=exobar_offset
      Coordinate EBB_tx: default_value=0.285882 range=(-0.5 0.3) clamped=false
      PhysicalOffsetFrame exobase_offset: socket_parent=/bodyset/exo_base translation=(0 0.13 -0.08)
      PhysicalOffsetFrame exobar_offset: socket_parent=/bodyset/exobar translation=(0.18 0.26 0.56)
          orientation=(0.25 0 0)
      SpatialTransform: axes_held_at_zero=(rotation2 rotation3 translation1 translation2 translation3)
        TransformAxis rotation1: coordinates=EBB_tx axis=(1 0 0) LinearFunction(coefficients=1 0)
    WeldJoint exobasebar_2: socket_parent_frame=exobar_1_offset socket_child_frame=exobar_2_offset
      PhysicalOffsetFrame exobar_1_offset: socket_parent=/bodyset/exobar translation=(0 0 0)
      PhysicalOffsetFrame exobar_2_offset: socket_parent=/bodyset/exobar_2 translation=(0 0 0)
    WeldJoint exobasebar_3: socket_parent_frame=exobar_2_offset socket_child_frame=exobar_3_offset
      PhysicalOffsetFrame exobar_2_offset: socket_parent=/bodyset/exobar_2 translation=(0 0 0)
      PhysicalOffsetFrame exobar_3_offset: socket_parent=/bodyset/exobar_3 translation=(0 0 0)
    CustomJoint exobarhand: socket_parent_frame=exobar_offset socket_child_frame=exohand_offset
      Coordinate EBH_ty: default_value=0.2140819 range=(-1 1.5) clamped=false
      PhysicalOffsetFrame exobar_offset: socket_parent=/bodyset/exobar translation=(0.1815 0.328 0.49)
          orientation=(0.08 0.03 -0.2)
      PhysicalOffsetFrame exohand_offset: socket_parent=/bodyset/exohand translation=(0.2 0.325 0.47)
          orientation=(0.08 0 0)
      SpatialTransform: axes_held_at_zero=(rotation1 rotation2 translation1 translation2 translation3)
        TransformAxis rotation3: coordinates=EBH_ty axis=(0 0 1) LinearFunction(coefficients=1 0)
    WeldJoint exobarhand_2: socket_parent_frame=exohand_1_offset socket_child_frame=exohand_2_offset
      PhysicalOffsetFrame exohand_1_offset: socket_parent=/bodyset/exohand translation=(0 0 0)
      PhysicalOffsetFrame exohand_2_offset: socket_parent=/bodyset/exohand_2 translation=(0 0 0.02)
    WeldJoint exobarhand_3: socket_parent_frame=exohand_2_offset socket_child_frame=exohand_3_offset
      PhysicalOffsetFrame exohand_2_offset: socket_parent=/bodyset/exohand_2 translation=(0 0 0)
      PhysicalOffsetFrame exohand_3_offset: socket_parent=/bodyset/exohand_3 translation=(0 0 0)
    WeldJoint exobarhand_4: socket_parent_frame=exobarhand_3_offset socket_child_frame=exobarhand_4_offset
      PhysicalOffsetFrame exobarhand_3_offset: socket_parent=/bodyset/exohand_3 translation=(0 0 0)
      PhysicalOffsetFrame exobarhand_4_offset: socket_parent=/bodyset/exohand_4 translation=(0 0 -0.02)
    CustomJoint exohandthumbmotor: socket_parent_frame=exohand_offset socket_child_frame=exothumbmotor_offset
      Coordinate ETM_z: default_value=0.3499909 range=(-0.3 1) clamped=false locked=true
      PhysicalOffsetFrame exohand_offset: socket_parent=/bodyset/exohand translation=(0.13 0.42 0.42)
      PhysicalOffsetFrame exothumbmotor_offset: socket_parent=/bodyset/exothumbmotor translation=(0.133 0.42 0.4)
      SpatialTransform: axes_held_at_zero=(rotation1 rotation2 translation1 translation2 translation3)
        TransformAxis rotation3: coordinates=ETM_z axis=(0 0 1) LinearFunction(coefficients=1 0)
    WeldJoint exothumb_motor_2: socket_parent_frame=exothumbmotor_offset socket_child_frame=exothumbmotor_2_offset
      PhysicalOffsetFrame exothumbmotor_offset: socket_parent=/bodyset/exothumbmotor translation=(0 0 0)
      PhysicalOffsetFrame exothumbmotor_2_offset: socket_parent=/bodyset/exothumbmotor_2 translation=(0 0 0)
    CustomJoint exothumb: socket_parent_frame=exothumbmotor_offset socket_child_frame=exothumb_offset
      Coordinate ET_z: default_value=-0.8592016 range=(-2 1) clamped=false
      PhysicalOffsetFrame exothumbmotor_offset: socket_parent=/bodyset/exothumbmotor translation=(0.135 0.425 0.37)
          orientation=(2.64159 -1.24159 -3.74159)
      PhysicalOffsetFrame exothumb_offset: socket_parent=/bodyset/exothumb translation=(-0.023 0 0)
      SpatialTransform: axes_held_at_zero=(rotation1 rotation2 translation1 translation2 translation3)
        TransformAxis rotation3: coordinates=ET_z axis=(0 0 1) LinearFunction(coefficients=1 0)
    CustomJoint exomotorfingers: socket_parent_frame=exomotor_offset socket_child_frame=exofingers_offset
      Coordinate EF_y: default_value=0.0732411 range=(-0.3 1) clamped=false
      PhysicalOffsetFrame exomotor_offset: socket_parent=/bodyset/exohand translation=(0.27 0.38 0.34)
          orientation=(0.1 -0.4 0)
      PhysicalOffsetFrame exofingers_offset: socket_parent=/bodyset/exofingers translation=(0.27 0.38 0.35)
          orientation=(0.1 0 0)
      SpatialTransform: axes_held_at_zero=(rotation1 rotation3 translation1 translation2 translation3)
        TransformAxis rotation2: coordinates=EF_y axis=(0 1 0) LinearFunction(coefficients=1 0)
    WeldJoint exomotorfingers_2: socket_parent_frame=exofingers_offset socket_child_frame=exofingers_2_offset
      PhysicalOffsetFrame exofingers_offset: socket_parent=/bodyset/exofingers translation=(0 0 0)
      PhysicalOffsetFrame exofingers_2_offset: socket_parent=/bodyset/exofingers_2 translation=(0 0 0)
  ConstraintSet:
    CoordinateCouplerConstraint HU_x_EL_r: independent_coordinate_names=HU_x dependent_coordinate_name=EL_x
        scale_factor=1
      coupled_coordinates_function: SimmSpline: x=(-0.199 0.399 0.917) y=(1.97 1.3 0.55)
    CoordinateCouplerConstraint HU_x_HU_yy_r: independent_coordinate_names=HU_x dependent_coordinate_name=HU_yy
        scale_factor=1
      coupled_coordinates_function: SimmSpline: x=(-0.19984 0.399157 0.899892) y=(-0.238412 0.0844739 0.438427)
    CoordinateCouplerConstraint HU_x_HU_z_r: independent_coordinate_names=HU_x dependent_coordinate_name=HU_z
        scale_factor=1
      coupled_coordinates_function: SimmSpline: x=(-0.19984 0.399157 0.899892) y=(0.434063 0.560425 0.623606)
    CoordinateCouplerConstraint HU_x_WR_x: independent_coordinate_names=HU_x dependent_coordinate_name=WR_x
        scale_factor=1
      coupled_coordinates_function: SimmSpline: x=(-0.19984 0.399157 0.899892) y=(-0.491205 -0.370359 -0.337372)
    CoordinateCouplerConstraint HU_x_WR_zz: independent_coordinate_names=HU_x dependent_coordinate_name=WR_zz
        scale_factor=1
      coupled_coordinates_function: SimmSpline: x=(-0.19984 0.399157 0.899892) y=(-0.00322886 -0.00460767 -0.010472)
    CoordinateCouplerConstraint HU_x_EM_tz_r: independent_coordinate_names=HU_x dependent_coordinate_name=EM_tz
        scale_factor=1
      coupled_coordinates_function: SimmSpline: x=(-0.199 0.399 0.971) y=(-0.48 -0.382 -0.297)
    CoordinateCouplerConstraint HU_x_EBB_tx_r: independent_coordinate_names=HU_x dependent_coordinate_name=EBB_tx
        scale_factor=1
      coupled_coordinates_function: SimmSpline: x=(0.399139 0.783339) y=(0.285885 0.133326)
    CoordinateCouplerConstraint EL_yy_EBH_ty_r: independent_coordinate_names=EL_yy dependent_coordinate_name=EBH_ty
        scale_factor=1
      coupled_coordinates_function: SimmSpline: x=(-0.0779464 0.983947 1.35734) y=(-0.546812 0.214082 0.43738)
    CoordinateCouplerConstraint index_middle_proximal_r: independent_coordinate_names=PIF_x
        dependent_coordinate_name=PMF_x scale_factor=1
      coupled_coordinates_function: SimmSpline: x=(-2 2) y=(-2 2)
    CoordinateCouplerConstraint index_ring_proximal_r: independent_coordinate_names=PIF_x
        dependent_coordinate_name=PRF_x scale_factor=1
      coupled_coordinates_function: SimmSpline: x=(-2 2) y=(-2 2)
    CoordinateCouplerConstraint index_little_proximal_r: independent_coordinate_names=PIF_x
        dependent_coordinate_name=PLF_x scale_factor=1
      coupled_coordinates_function: SimmSpline: x=(-2 2) y=(-2 2)
    CoordinateCouplerConstraint index_thumb_proximal_r: independent_coordinate_names=PIF_x
        dependent_coordinate_name=MTF_z scale_factor=1
      coupled_coordinates_function: SimmSpline: x=(-0.2 0.75) y=(-1.9 -0.87)
    CoordinateCouplerConstraint fingers_exo_strap_r: independent_coordinate_names=PIF_x dependent_coordinate_name=EF_y
        scale_factor=1
      coupled_coordinates_function: SimmSpline: x=(0.213105 0.789936) y=(-0.267035 0.146608)
    CoordinateCouplerConstraint thumb_exo_strap_r: independent_coordinate_names=PIF_x dependent_coordinate_name=ET_z
        scale_factor=1
      coupled_coordinates_function: SimmSpline: x=(0.287979 0.834791 1.10828) y=(-1.38579 -0.698132 -0.445757)
  ForceSet:
    Schutte1993Muscle_Deprecated pect_maj_c_1: min_control=0 max_control=1 max_isometric_force=500
        optimal_fiber_length=0.1363 tendon_slack_length=0.017 pennation_angle_at_optimal=0 [radians]
        activation1=45.41056 activation2=17.48252
      PathPoint P1: clavicle_r (0.01077528 -0.004354789 0.005626835)
      PathPoint P2: humerus_r (0.01184 -0.08869 -0.01555)
      PathWrap: wrap_object=ter_lat_pec
      PathWrap pathwrap2: wrap_object=serr_ant
      passive_force_length_curve: SimmSpline: x=(-5 0.998 0.999 1 1.1 1.2 1.3 1.4 1.5 1.6 1.601 1.602 5)
          y=(0 0 0 0 0.035 0.12 0.26 0.55 1.17 2 2 2 2)
    Schutte1993Muscle_Deprecated lat_dorsi_2: min_control=0 max_control=1 max_isometric_force=500
        optimal_fiber_length=0.2857 tendon_slack_length=0.083 pennation_angle_at_optimal=0 activation1=62.32493
        activation2=21.0084
      PathPoint P1: thorax (-0.001692688 -0.1838134 0.1032612)
      PathPoint P2: humerus_r (-0.007302628 -0.04279552 -0.003347294)
      PathWrap: wrap_object=ter_lat_pec
      PathWrap pathwrap2: wrap_object=serr_ant
      passive_force_length_curve: SimmSpline: x=(-5 0.998 0.999 1 1.1 1.2 1.3 1.4 1.5 1.6 1.601 1.602 5)
          y=(0 0 0 0 0.035 0.12 0.26 0.55 1.17 2 2 2 2)
    Schutte1993Muscle_Deprecated delt_scap_4: min_control=0 max_control=1 max_isometric_force=117
        optimal_fiber_length=0.0666 tendon_slack_length=0.045 pennation_angle_at_optimal=0.08726646
        activation1=25.90274 activation2=11.97605
      PathPoint P1: scapula_r (-0.004810571 0.004639891 -0.00364835)
      PathPoint P2: humerus_r (0.01571 -0.08467 0.00404)
      PathWrap: wrap_object=deltoid
      passive_force_length_curve: SimmSpline: x=(-5 0.998 0.999 1 1.1 1.2 1.3 1.4 1.5 1.6 1.601 1.602 5)
          y=(0 0 0 0 0.035 0.12 0.26 0.55 1.17 2 2 2 2)
    Schutte1993Muscle_Deprecated delt_scap_8: min_control=0 max_control=1 max_isometric_force=150
        optimal_fiber_length=0.071 tendon_slack_length=0.065 pennation_angle_at_optimal=0.08726646 activation1=120.0992
        activation2=29.15452
      PathPoint P1: scapula_r (0.01504934 0.005355834 -0.02029937)
      PathPoint P2: humerus_r (0.01646 -0.10894 0.00661)
      PathWrap: wrap_object=deltoid
      passive_force_length_curve: SimmSpline: x=(-5 0.998 0.999 1 1.1 1.2 1.3 1.4 1.5 1.6 1.601 1.602 5)
          y=(0 0 0 0 0.035 0.12 0.26 0.55 1.17 2 2 2 2)
    Schutte1993Muscle_Deprecated delt_scap11: min_control=0 max_control=1 max_isometric_force=150
        optimal_fiber_length=0.0737 tendon_slack_length=0.048 pennation_angle_at_optimal=0.08726646
        activation1=79.16934 activation2=23.92344
      PathPoint P1: scapula_r (0.01873933 0.006498139 -0.04294811)
      PathPoint P2: humerus_r (0.01806 -0.09231 -0.00863)
      PathWrap: wrap_object=deltoid
      passive_force_length_curve: SimmSpline: x=(-5 0.998 0.999 1 1.1 1.2 1.3 1.4 1.5 1.6 1.601 1.602 5)
          y=(0 0 0 0 0.035 0.12 0.26 0.55 1.17 2 2 2 2)
    Schutte1993Muscle_Deprecated delt_clav_3: min_control=0 max_control=1 max_isometric_force=105
        optimal_fiber_length=0.0824 tendon_slack_length=0.067 pennation_angle_at_optimal=0.08726646
        activation1=79.16934 activation2=23.92344
      PathPoint P1: clavicle_r (0.1314744 0.01419768 -0.00785354)
      PathPoint P2: humerus_r (0.01673 -0.09943 -0.0097)
      PathWrap: wrap_object=deltoid
      passive_force_length_curve: SimmSpline: x=(-5 0.998 0.999 1 1.1 1.2 1.3 1.4 1.5 1.6 1.601 1.602 5)
          y=(0 0 0 0 0.035 0.12 0.26 0.55 1.17 2 2 2 2)
    Schutte1993Muscle_Deprecated tric_long_3: min_control=0 max_control=1 max_isometric_force=283
        optimal_fiber_length=0.1183 tendon_slack_length=0.218 pennation_angle_at_optimal=0.1745329 activation1=62.32493
        activation2=21.0084
      PathPoint P1: ulna_r (-0.02171694 0.0129836 -0.006152533)
      PathPoint P2: scapula_r (-0.02254 -0.03911 -0.02787)
      PathWrap: wrap_object=elbow
      passive_force_length_curve: SimmSpline: x=(-5 1.397 1.399 1.4 1.54 1.68 1.82 1.96 2.1 2.24 2.241 2.243 5)
          y=(0 0 0 0 0.035 0.12 0.26 0.55 1.17 2 2 2 2)
    Schutte1993Muscle_Deprecated tric_med_2: min_control=0 max_control=1 max_isometric_force=256
        optimal_fiber_length=0.0773 tendon_slack_length=0.1122 pennation_angle_at_optimal=0 activation1=62.32493
        activation2=21.0084
      PathPoint P1: humerus_r (0.00479932 -0.1291572 0.01748078)
      PathPoint P2: ulna_r (-0.03162879 0.01301418 -0.002227339)
      PathWrap: wrap_object=elbow
      passive_force_length_curve: SimmSpline: x=(-5 1.297 1.299 1.3 1.43 1.56 1.69 1.82 1.95 2.08 2.081 2.083 5)
          y=(0 0 0 0 0.035 0.12 0.26 0.55 1.17 2 2 2 2)
    Schutte1993Muscle_Deprecated bic_l: min_control=0 max_control=1 max_isometric_force=250 optimal_fiber_length=0.1292
        tendon_slack_length=0.2335 pennation_angle_at_optimal=0 activation1=45.41056 activation2=17.48252
      PathPoint P1: scapula_r (0.02362799 -0.02662208 -0.05517646)
      PathPoint P2: humerus_r (0.01897486 -0.06275678 -0.006181973)
      PathPoint P3: radius_r (0.01296544 -0.02193501 0.00363338)
      PathWrap: wrap_object=elbow_circ
      passive_force_length_curve: SimmSpline: x=(-5 1.297 1.299 1.3 1.43 1.56 1.69 1.82 1.95 2.08 2.081 2.083 5)
          y=(0 0 0 0 0.035 0.12 0.26 0.55 1.17 2 2 2 2)
    Schutte1993Muscle_Deprecated bic_b_1: min_control=0 max_control=1 max_isometric_force=150
        optimal_fiber_length=0.117 tendon_slack_length=0.1913 pennation_angle_at_optimal=0 activation1=45.41056
        activation2=17.48252
      PathPoint P1: scapula_r (-0.00915 -0.00833 -0.08244)
      PathPoint P2: radius_r (0.01306162 -0.0195415 0.006306606)
      PathWrap: wrap_object=elbow_circ
      passive_force_length_curve: SimmSpline: x=(-5 1.497 1.498 1.5 1.65 1.8 1.95 2.1 2.25 2.4 2.402 2.403 5)
          y=(0 0 0 0 0.035 0.12 0.26 0.55 1.17 2 2 2 2)
    Schutte1993Muscle_Deprecated brachialis_2: min_control=0 max_control=1 max_isometric_force=120
        optimal_fiber_length=0.0953 tendon_slack_length=0.0592 pennation_angle_at_optimal=0 activation1=62.32493
        activation2=21.0084
      PathPoint P1: humerus_r (-0.00285 -0.154 -0.00517)
      PathPoint P2: ulna_r (-0.002455368 -0.05052497 0.02330307)
      PathWrap: wrap_object=elbow_circ
      passive_force_length_curve: SimmSpline: x=(-5 1.198 1.199 1.2 1.32 1.44 1.56 1.68 1.8 1.92 1.921 1.922 5)
          y=(0 0 0 0 0.035 0.12 0.26 0.55 1.17 2 2 2 2)
    Schutte1993Muscle_Deprecated brachiorad_2: min_control=0 max_control=1 max_isometric_force=60
        optimal_fiber_length=0.1613 tendon_slack_length=0.1197 pennation_angle_at_optimal=0 activation1=62.32493
        activation2=21.0084
      PathPoint P1: humerus_r (0.002052356 -0.183753 -0.002301348)
      PathPoint P2: radius_r (0.01570745 -0.02490665 0.005791751)
      PathPoint P3: radius_r (0.004704907 -0.1565583 0.05004167)
      PathWrap: wrap_object=elbow_circ
      passive_force_length_curve: SimmSpline: x=(-5 1.198 1.199 1.2 1.32 1.44 1.56 1.68 1.8 1.92 1.921 1.922 5)
          y=(0 0 0 0 0.035 0.12 0.26 0.55 1.17 2 2 2 2)
    Schutte1993Muscle_Deprecated pron_teres_1: min_control=0 max_control=1 max_isometric_force=200
        optimal_fiber_length=0.061 tendon_slack_length=0.0851 pennation_angle_at_optimal=0 activation1=62.32493
        activation2=21.0084
      PathPoint P1: humerus_r (-0.02503876 -0.285505 -0.003214023)
      PathPoint P2: radius_r (0.01120599 -0.06237546 0.02989446)
      PathWrap: wrap_object=ulna_radius
      passive_force_length_curve: SimmSpline: x=(-5 1.297 1.299 1.3 1.43 1.56 1.69 1.82 1.95 2.08 2.081 2.083 5)
          y=(0 0 0 0 0.035 0.12 0.26 0.55 1.17 2 2 2 2)
    Schutte1993Muscle_Deprecated supinator_2: min_control=0 max_control=1 max_isometric_force=232
        optimal_fiber_length=0.026 tendon_slack_length=0.0231 pennation_angle_at_optimal=0 activation1=62.32493
        activation2=21.0084
      PathPoint P1: ulna_r (-0.0316727 0.001415853 0.003277851)
      PathPoint P2: radius_r (-0.006670571 -0.0669957 0.03169502)
      PathWrap: wrap_object=supinator
      passive_force_length_curve: SimmSpline: x=(-5 1.198 1.199 1.2 1.32 1.44 1.56 1.68 1.8 1.92 1.921 1.922 5)
          y=(0 0 0 0 0.035 0.12 0.26 0.55 1.17 2 2 2 2)
    Schutte1993Muscle_Deprecated tric_lat_3: min_control=0 max_control=1 max_isometric_force=219
        optimal_fiber_length=0.0656 tendon_slack_length=0.1911 pennation_angle_at_optimal=0.1745329
        activation1=62.32493 activation2=21.0084
      PathPoint P1: humerus_r (0.006660638 -0.07171912 0.01030254)
      PathPoint P2: humerus_r (-0.007325581 -0.2996072 0.02914628)
      PathPoint P3: ulna_r (-0.03390711 -0.04592609 0.02170859)
      PathWrap: wrap_object=elbow
      passive_force_length_curve: SimmSpline: x=(-5 1.198 1.199 1.2 1.32 1.44 1.56 1.68 1.8 1.92 1.921 1.922 5)
          y=(0 0 0 0 0.035 0.12 0.26 0.55 1.17 2 2 2 2)
    Schutte1993Muscle_Deprecated FCR: min_control=0 max_control=1 optimal_force=1 max_isometric_force=59.7
        optimal_fiber_length=0.0628 tendon_slack_length=0.2185 pennation_angle_at_optimal=0.05410521
        max_contraction_velocity=10 time_scale=0.1 activation1=7.667 activation2=1.459854 damping=0.05
      PathPoint P1: humerus_r (-0.0223119 -0.2890792 0.003102171)
      PathPoint P2: radius_r (0.005772291 -0.2133604 0.04832711)
      PathPoint P3: trapezoid (0.005262712 0.004806782 -0.01471998)
      PathPoint P4: metacarpal2 (0.00592 0.00269 0.01328)
      tendon_force_length_curve: SimmSpline: x=(-10 -0.002 -0.001 0 0.00131 0.00281 0.00431 0.00581 0.00731 0.00881 0.0103 0.0118 0.0123 9.2 9.201 9.202 20)
          y=(0 0 0 0 0.0108 0.0257 0.0435 0.0652 0.0915 0.123 0.161 0.208 0.227 345 345 345 345)
      active_force_length_curve: SimmSpline: x=(-35 0 0.401 0.402 0.4035 0.52725 0.62875 0.71875 0.86125 1.045 1.2175 1.43875 1.61875 1.62 1.621 2.2 35)
          y=(0 0 0 0 0 0.226667 0.636667 0.856667 0.95 0.993333 0.77 0.246667 0 0 0 0 0)
      passive_force_length_curve: SimmSpline: x=(-35 0.998 0.999 1.15 1.25 1.35 1.45 1.55 1.65 1.75 1.7501 1.7502 35)
          y=(0 0 0 0 0.035 0.12 0.26 0.55 1.17 2 2 2 2)
    Schutte1993Muscle_Deprecated FCU: min_control=0 max_control=1 optimal_force=1 max_isometric_force=102.6
        optimal_fiber_length=0.0509 tendon_slack_length=0.242 pennation_angle_at_optimal=0.2111848
        max_contraction_velocity=10 time_scale=0.1 activation1=7.667 activation2=1.459854 damping=0.05
      PathPoint P1: humerus_r (-0.03079952 -0.2848395 0.006536707)
      PathPoint P2: metacarpal5 (0.00845 -0.0091 -0.01963)
      tendon_force_length_curve: SimmSpline: x=(-10 -0.002 -0.001 0 0.00131 0.00281 0.00431 0.00581 0.00731 0.00881 0.0103 0.0118 0.0123 9.2 9.201 9.202 20)
          y=(0 0 0 0 0.0108 0.0257 0.0435 0.0652 0.0915 0.123 0.161 0.208 0.227 345 345 345 345)
      active_force_length_curve: SimmSpline: x=(-35 0 0.401 0.402 0.4035 0.52725 0.62875 0.71875 0.86125 1.045 1.2175 1.43875 1.61875 1.62 1.621 2.2 35)
          y=(0 0 0 0 0 0.226667 0.636667 0.856667 0.95 0.993333 0.77 0.246667 0 0 0 0 0)
      passive_force_length_curve: SimmSpline: x=(-35 0.998 0.999 1.15 1.25 1.35 1.45 1.55 1.65 1.75 1.7501 1.7502 35)
          y=(0 0 0 0 0.035 0.12 0.26 0.55 1.17 2 2 2 2)
    Schutte1993Muscle_Deprecated ECU: min_control=0 max_control=1 optimal_force=1 max_isometric_force=117
        optimal_fiber_length=0.0622 tendon_slack_length=0.231 pennation_angle_at_optimal=0.06108652
        max_contraction_velocity=10 time_scale=0.1 activation1=7.667 activation2=1.459854 damping=0.05
      PathPoint ECU_pre-surgery-P1: humerus_r (0.009882408 -0.2902333 0.0173775)
      PathPoint ECU_pre-surgery-P2: radius_r (-0.01276557 -0.004930771 -0.005891604)
      PathPoint ECU_pre-surgery-P3: radius_r (-0.01399708 -0.03388847 0.006763546)
      PathPoint ECU_pre-surgery-P4: ulna_r (-0.02542575 -0.0938913 0.03653847)
      PathPoint ECU_pre-surgery-P5: ulna_r (-0.03077224 -0.2266967 0.06779241)
      PathPoint ECU_pre-surgery-P6: triquetrum (-0.00094 -0.00436 -0.00442)
      PathPoint ECU_pre-surgery-P7: metacarpal5 (-0.00458 -0.00734 -0.02848)
      tendon_force_length_curve: SimmSpline: x=(-10 -0.002 -0.001 0 0.00131 0.00281 0.00431 0.00581 0.00731 0.00881 0.0103 0.0118 0.0123 9.2 9.201 9.202 20)
          y=(0 0 0 0 0.0108 0.0257 0.0435 0.0652 0.0915 0.123 0.161 0.208 0.227 345 345 345 345)
      active_force_length_curve: SimmSpline: x=(-35 0 0.401 0.402 0.4035 0.52725 0.62875 0.71875 0.86125 1.045 1.2175 1.43875 1.61875 1.62 1.621 2.2 35)
          y=(0 0 0 0 0 0.226667 0.636667 0.856667 0.95 0.993333 0.77 0.246667 0 0 0 0 0)
      passive_force_length_curve: SimmSpline: x=(-35 0.998 0.999 1.15 1.25 1.35 1.45 1.55 1.65 1.75 1.7501 1.7502 35)
          y=(0 0 0 0 0.035 0.12 0.26 0.55 1.17 2 2 2 2)
    Schutte1993Muscle_Deprecated ECRL: min_control=0 max_control=1 optimal_force=1 max_isometric_force=65.7
        optimal_fiber_length=0.0936 tendon_slack_length=0.2026 pennation_angle_at_optimal=0.04363323
        max_contraction_velocity=10 time_scale=0.1 activation1=7.667 activation2=1.459854 damping=0.05
      PathPoint P1: humerus_r (0.01738062 -0.2795535 0.02252901)
      PathPoint P3: radius_r (-0.0151073 -0.0009248175 0.001649389)
      PathPoint P4: radius_r (-0.0083 -0.21052 0.0752)
      ConditionalPathPoint P5: metacarpal2 (-0.01349 0.01118 0.02204)
          socket_coordinate=/jointset/auxprfem-auxprrud/WR_zz range=(0 0) [radians]
      PathPoint P6: metacarpal2 (-0.01108 -0.01106 0.02568)
      tendon_force_length_curve: SimmSpline: x=(-10 -0.002 -0.001 0 0.00131 0.00281 0.00431 0.00581 0.00731 0.00881 0.0103 0.0118 0.0123 9.2 9.201 9.202 20)
          y=(0 0 0 0 0.0108 0.0257 0.0435 0.0652 0.0915 0.123 0.161 0.208 0.227 345 345 345 345)
      active_force_length_curve: SimmSpline: x=(-35 0 0.401 0.402 0.4035 0.52725 0.62875 0.71875 0.86125 1.045 1.2175 1.43875 1.61875 1.62 1.621 2.2 35)
          y=(0 0 0 0 0 0.226667 0.636667 0.856667 0.95 0.993333 0.77 0.246667 0 0 0 0 0)
      passive_force_length_curve: SimmSpline: x=(-35 0.998 0.999 1.15 1.25 1.35 1.45 1.55 1.65 1.75 1.7501 1.7502 35)
          y=(0 0 0 0 0.035 0.12 0.26 0.55 1.17 2 2 2 2)
    Schutte1993Muscle_Deprecated FDSI: min_control=0 max_control=1 optimal_force=20 max_isometric_force=20
        optimal_fiber_length=0.0835 tendon_slack_length=0.338 pennation_angle_at_optimal=0.1047198
        max_contraction_velocity=10 time_scale=0.1 activation1=7.667 activation2=1.459854 damping=0.05
      PathPoint P1: humerus_r (0.007182428 -0.2756855 0.01326378)
      PathPoint P6: capitate (0.0262027 -0.007463856 0.007441169)
      PathPoint P7: metacarpal2 (0.01297 -0.01437 0.02183)
      PathPoint P8: metacarpal2 (0.005686493 -0.06256175 0.04344313)
      PathPoint P9: Iphalanx1 (0.01051726 -0.04670016 0.006399346)
      tendon_force_length_curve: SimmSpline: x=(-10 -0.002 -0.001 0 0.00131 0.00281 0.00431 0.00581 0.00731 0.00881 0.0103 0.0118 0.0123 9.2 9.201 9.202 20)
          y=(0 0 0 0 0.0108 0.0257 0.0435 0.0652 0.0915 0.123 0.161 0.208 0.227 345 345 345 345)
      active_force_length_curve: SimmSpline: x=(-35 0 0.401 0.402 0.4035 0.52725 0.62875 0.71875 0.86125 1.045 1.2175 1.43875 1.61875 1.62 1.621 2.2 35)
          y=(0 0 0 0 0 0.226667 0.636667 0.856667 0.95 0.993333 0.77 0.246667 0 0 0 0 0)
      passive_force_length_curve: SimmSpline: x=(-35 0.998 0.999 1.15 1.25 1.35 1.45 1.55 1.65 1.75 1.7501 1.7502 35)
          y=(0 0 0 0 0.035 0.12 0.26 0.55 1.17 2 2 2 2)
    Schutte1993Muscle_Deprecated FDSM: min_control=0 max_control=1 optimal_force=1 max_isometric_force=50
        optimal_fiber_length=0.0749 tendon_slack_length=0.354 pennation_angle_at_optimal=0.1221731
        max_contraction_velocity=10 time_scale=0.1 activation1=7.667 activation2=1.459854 damping=0.05
      PathPoint P1: humerus_r (0.009048501 -0.2960899 0.008545409)
      PathPoint P6: capitate (0.02921414 -0.009637744 0.00723896)
      PathPoint P7: metacarpal3 (0.0144 -0.01632 0.01008)
      PathPoint P8: metacarpal3 (0.005471472 -0.0768161 0.01643278)
      PathPoint P9: Mphalanx1 (0.005904875 -0.04584896 0.008910324)
      tendon_force_length_curve: SimmSpline: x=(-10 -0.002 -0.001 0 0.00131 0.00281 0.00431 0.00581 0.00731 0.00881 0.0103 0.0118 0.0123 9.2 9.201 9.202 20)
          y=(0 0 0 0 0.0108 0.0257 0.0435 0.0652 0.0915 0.123 0.161 0.208 0.227 345 345 345 345)
      active_force_length_curve: SimmSpline: x=(-35 0 0.401 0.402 0.4035 0.52725 0.62875 0.71875 0.86125 1.045 1.2175 1.43875 1.61875 1.62 1.621 2.2 35)
          y=(0 0 0 0 0 0.226667 0.636667 0.856667 0.95 0.993333 0.77 0.246667 0 0 0 0 0)
      passive_force_length_curve: SimmSpline: x=(-35 0.998 0.999 1.15 1.25 1.35 1.45 1.55 1.65 1.75 1.7501 1.7502 35)
          y=(0 0 0 0 0.035 0.12 0.26 0.55 1.17 2 2 2 2)
    Schutte1993Muscle_Deprecated FDSR: min_control=0 max_control=1 optimal_force=1 max_isometric_force=48
        optimal_fiber_length=0.075 tendon_slack_length=0.3535 pennation_angle_at_optimal=0.06981317
        max_contraction_velocity=10 time_scale=0.1 activation1=7.667 activation2=1.459854 damping=0.05
      PathPoint P1: humerus_r (0.006914329 -0.2962025 0.009338719)
      PathPoint P6: capitate (0.02538777 -0.01449981 0.004074008)
      PathPoint P7: metacarpal3 (0.008809835 -0.0232645 -0.0005659795)
      PathPoint P8: metacarpal4 (0.009687479 -0.07722954 -0.004855617)
      PathPoint P9: Rphalanx1 (0.006480554 -0.04687953 0.006722998)
      tendon_force_length_curve: SimmSpline: x=(-10 -0.002 -0.001 0 0.00131 0.00281 0.00431 0.00581 0.00731 0.00881 0.0103 0.0118 0.0123 9.2 9.201 9.202 20)
          y=(0 0 0 0 0.0108 0.0257 0.0435 0.0652 0.0915 0.123 0.161 0.208 0.227 345 345 345 345)
      active_force_length_curve: SimmSpline: x=(-35 0 0.401 0.402 0.4035 0.52725 0.62875 0.71875 0.86125 1.045 1.2175 1.43875 1.61875 1.62 1.621 2.2 35)
          y=(0 0 0 0 0 0.226667 0.636667 0.856667 0.95 0.993333 0.77 0.246667 0 0 0 0 0)
      passive_force_length_curve: SimmSpline: x=(-35 0.998 0.999 1.15 1.25 1.35 1.45 1.55 1.65 1.75 1.7501 1.7502 35)
          y=(0 0 0 0 0.035 0.12 0.26 0.55 1.17 2 2 2 2)
    Schutte1993Muscle_Deprecated FDSL: min_control=0 max_control=1 optimal_force=1 max_isometric_force=30
        optimal_fiber_length=0.0515 tendon_slack_length=0.343 pennation_angle_at_optimal=0.08726646
        max_contraction_velocity=10 time_scale=0.1 activation1=7.667 activation2=1.459854 damping=0.05
      PathPoint P1: humerus_r (0.0035 -0.29455 0.01526)
      PathPoint P6: capitate (0.0268 -0.0129 0.0061)
      PathPoint P7: metacarpal4 (0.008616519 -0.021781 -0.01883787)
      PathPoint P8: metacarpal5 (0.01027467 -0.05440378 -0.03566202)
      PathPoint P9: Lphalanx1 (0.004861779 -0.03109541 0.004084284)
      tendon_force_length_curve: SimmSpline: x=(-10 -0.002 -0.001 0 0.00131 0.00281 0.00431 0.00581 0.00731 0.00881 0.0103 0.0118 0.0123 9.2 9.201 9.202 20)
          y=(0 0 0 0 0.0108 0.0257 0.0435 0.0652 0.0915 0.123 0.161 0.208 0.227 345 345 345 345)
      active_force_length_curve: SimmSpline: x=(-35 0 0.401 0.402 0.4035 0.52725 0.62875 0.71875 0.86125 1.045 1.2175 1.43875 1.61875 1.62 1.621 2.2 35)
          y=(0 0 0 0 0 0.226667 0.636667 0.856667 0.95 0.993333 0.77 0.246667 0 0 0 0 0)
      passive_force_length_curve: SimmSpline: x=(-35 0.998 0.999 1.15 1.25 1.35 1.45 1.55 1.65 1.75 1.7501 1.7502 35)
          y=(0 0 0 0 0.035 0.12 0.26 0.55 1.17 2 2 2 2)
    Schutte1993Muscle_Deprecated EDCL: min_control=0 max_control=1 optimal_force=1 max_isometric_force=20
        optimal_fiber_length=0.065 tendon_slack_length=0.3495 pennation_angle_at_optimal=0.03490659
        max_contraction_velocity=10 time_scale=0.1 activation1=7.667 activation2=1.459854 damping=0.05
      PathPoint P1: humerus_r (0.01395588 -0.281488 0.01607754)
      PathPoint P2: radius_r (-0.01363465 -0.007027832 0.001511557)
      PathPoint P3: radius_r (-0.01974 -0.18469 0.04807)
      PathPoint P4: radius_r (-0.02211 -0.21097 0.05287)
      ConditionalPathPoint P5: scaphoid (-0.01357 -0.0079 -0.01241) socket_coordinate=/jointset/auxprfem-auxprrud/WR_zz
          range=(0 0)
      ConditionalPathPoint P6: capitate (-0.00192 -0.01151 0.00084) socket_coordinate=/jointset/auxprfem-auxprrud/WR_zz
          range=(0 0)
      PathPoint P8: metacarpal5 (-0.009486516 -0.06712529 -0.03623143)
      PathPoint P9: Lphalanx1 (-0.008423292 -0.04501232 0.00095703)
      tendon_force_length_curve: SimmSpline: x=(-10 -0.002 -0.001 0 0.00131 0.00281 0.00431 0.00581 0.00731 0.00881 0.0103 0.0118 0.0123 9.2 9.201 9.202 20)
          y=(0 0 0 0 0.0108 0.0257 0.0435 0.0652 0.0915 0.123 0.161 0.208 0.227 345 345 345 345)
      active_force_length_curve: SimmSpline: x=(-35 0 0.401 0.402 0.4035 0.52725 0.62875 0.71875 0.86125 1.045 1.2175 1.43875 1.61875 1.62 1.621 2.2 35)
          y=(0 0 0 0 0 0.226667 0.636667 0.856667 0.95 0.993333 0.77 0.246667 0 0 0 0 0)
      passive_force_length_curve: SimmSpline: x=(-35 0.998 0.999 1.15 1.25 1.35 1.45 1.55 1.65 1.75 1.7501 1.7502 35)
          y=(0 0 0 0 0.035 0.12 0.26 0.55 1.17 2 2 2 2)
    Schutte1993Muscle_Deprecated EDCR: min_control=0 max_control=1 optimal_force=1 max_isometric_force=38
        optimal_fiber_length=0.072 tendon_slack_length=0.39 pennation_angle_at_optimal=0.05235988
        max_contraction_velocity=10 time_scale=0.1 activation1=7.667 activation2=1.459854 damping=0.05
      PathPoint P1: humerus_r (0.00830931 -0.2858354 0.02005819)
      PathPoint P2: radius_r (-0.01420812 -0.01283978 -0.001460363)
      PathPoint P3: radius_r (-0.01766 -0.18446 0.04898)
      PathPoint P4: radius_r (-0.02021 -0.21054 0.05596)
      ConditionalPathPoint P5: scaphoid (-0.01286 -0.0042 -0.01106) socket_coordinate=/jointset/auxprfem-auxprrud/WR_zz
          range=(0 0)
      PathPoint P7: metacarpal4 (-0.01484045 -0.07838361 -0.01083696)
      PathPoint P8: Rphalanx1 (-0.005282654 -0.05726573 0.004993223)
      tendon_force_length_curve: SimmSpline: x=(-10 -0.002 -0.001 0 0.00131 0.00281 0.00431 0.00581 0.00731 0.00881 0.0103 0.0118 0.0123 9.2 9.201 9.202 20)
          y=(0 0 0 0 0.0108 0.0257 0.0435 0.0652 0.0915 0.123 0.161 0.208 0.227 345 345 345 345)
      active_force_length_curve: SimmSpline: x=(-35 0 0.401 0.402 0.4035 0.52725 0.62875 0.71875 0.86125 1.045 1.2175 1.43875 1.61875 1.62 1.621 2.2 35)
          y=(0 0 0 0 0 0.226667 0.636667 0.856667 0.95 0.993333 0.77 0.246667 0 0 0 0 0)
      passive_force_length_curve: SimmSpline: x=(-35 0.998 0.999 1.15 1.25 1.35 1.45 1.55 1.65 1.75 1.7501 1.7502 35)
          y=(0 0 0 0 0.035 0.12 0.26 0.55 1.17 2 2 2 2)
    Schutte1993Muscle_Deprecated EDCM: min_control=0 max_control=1 optimal_force=1 max_isometric_force=40
        optimal_fiber_length=0.0724 tendon_slack_length=0.39 pennation_angle_at_optimal=0.05235988
        max_contraction_velocity=10 time_scale=0.1 activation1=7.667 activation2=1.459854 damping=0.05
      PathPoint P1: humerus_r (0.006425242 -0.2869244 0.01813365)
      PathPoint P2: radius_r (-0.0138949 -0.008118532 -0.004538732)
      PathPoint P3: radius_r (-0.01675 -0.18466 0.04682)
      PathPoint P4: radius_r (-0.01933 -0.21054 0.05152)
      ConditionalPathPoint P5: scaphoid (-0.01198 -0.00332 -0.01283)
          socket_coordinate=/jointset/auxprfem-auxprrud/WR_zz range=(0 0)
      PathPoint P7: metacarpal3 (-0.01529036 -0.08739493 0.01140789)
      PathPoint P8: Mphalanx1 (-0.007935151 -0.05584885 0.007287606)
      tendon_force_length_curve: SimmSpline: x=(-10 -0.002 -0.001 0 0.00131 0.00281 0.00431 0.00581 0.00731 0.00881 0.0103 0.0118 0.0123 9.2 9.201 9.202 20)
          y=(0 0 0 0 0.0108 0.0257 0.0435 0.0652 0.0915 0.123 0.161 0.208 0.227 345 345 345 345)
      active_force_length_curve: SimmSpline: x=(-35 0 0.401 0.402 0.4035 0.52725 0.62875 0.71875 0.86125 1.045 1.2175 1.43875 1.61875 1.62 1.621 2.2 35)
          y=(0 0 0 0 0 0.226667 0.636667 0.856667 0.95 0.993333 0.77 0.246667 0 0 0 0 0)
      passive_force_length_curve: SimmSpline: x=(-35 0.998 0.999 1.15 1.25 1.35 1.45 1.55 1.65 1.75 1.7501 1.7502 35)
          y=(0 0 0 0 0.035 0.12 0.26 0.55 1.17 2 2 2 2)
    Schutte1993Muscle_Deprecated EDCI: min_control=0 max_control=1 optimal_force=1 max_isometric_force=20
        optimal_fiber_length=0.07 tendon_slack_length=0.385 pennation_angle_at_optimal=0.05235988
        max_contraction_velocity=10 time_scale=0.1 activation1=7.667 activation2=1.459854 damping=0.05
      PathPoint P1: humerus_r (0.0104673 -0.295195 0.01160034)
      PathPoint P2: radius_r (-0.009637754 -0.003547893 -0.01128592)
      PathPoint P3: radius_r (-0.02209 -0.18446 0.04898)
      PathPoint P4: radius_r (-0.02376 -0.21054 0.0533)
      ConditionalPathPoint P5: scaphoid (-0.01359 -0.00761 -0.01108)
          socket_coordinate=/jointset/auxprfem-auxprrud/WR_zz range=(0 0)
      ConditionalPathPoint P6: capitate (-0.00196 -0.00655 0.00232) socket_coordinate=/jointset/auxprfem-auxprrud/WR_zz
          range=(0 0)
      PathPoint P8: metacarpal2 (-0.01175425 -0.07692008 0.04354078)
      PathPoint P9: Iphalanx1 (-0.0007500709 -0.05255252 0.004704046)
      tendon_force_length_curve: SimmSpline: x=(-10 -0.002 -0.001 0 0.00131 0.00281 0.00431 0.00581 0.00731 0.00881 0.0103 0.0118 0.0123 9.2 9.201 9.202 20)
          y=(0 0 0 0 0.0108 0.0257 0.0435 0.0652 0.0915 0.123 0.161 0.208 0.227 345 345 345 345)
      active_force_length_curve: SimmSpline: x=(-35 0 0.401 0.402 0.4035 0.52725 0.62875 0.71875 0.86125 1.045 1.2175 1.43875 1.61875 1.62 1.621 2.2 35)
          y=(0 0 0 0 0 0.226667 0.636667 0.856667 0.95 0.993333 0.77 0.246667 0 0 0 0 0)
      passive_force_length_curve: SimmSpline: x=(-35 0.998 0.999 1.15 1.25 1.35 1.45 1.55 1.65 1.75 1.7501 1.7502 35)
          y=(0 0 0 0 0.035 0.12 0.26 0.55 1.17 2 2 2 2)
    Schutte1993Muscle_Deprecated APL: min_control=0 max_control=1 optimal_force=1 max_isometric_force=57.9
        optimal_fiber_length=0.0713 tendon_slack_length=0.125 pennation_angle_at_optimal=0.1308997
        max_contraction_velocity=10 time_scale=0.1 activation1=7.667 activation2=1.459854 damping=0.05
      PathPoint P1: radius_r (-0.00494 -0.09677 0.03004)
      PathPoint P2: radius_r (-0.00892 -0.13772 0.05255)
      PathPoint P3: radius_r (-0.0066 -0.15947 0.06132)
      PathPoint P4: radius_r (-0.00682 -0.17731 0.06462)
      PathPoint P5: radius_r (-0.00282 -0.20831 0.07607)
      PathPoint P8: thumb (0.001064966 0.007298237 0.01657472)
      PathPoint P9: thumb (0.00410087 -0.01894407 0.03376613)
      tendon_force_length_curve: SimmSpline: x=(-10 -0.002 -0.001 0 0.00131 0.00281 0.00431 0.00581 0.00731 0.00881 0.0103 0.0118 0.0123 9.2 9.201 9.202 20)
          y=(0 0 0 0 0.0108 0.0257 0.0435 0.0652 0.0915 0.123 0.161 0.208 0.227 345 345 345 345)
      active_force_length_curve: SimmSpline: x=(-35 0 0.401 0.402 0.4035 0.52725 0.62875 0.71875 0.86125 1.045 1.2175 1.43875 1.61875 1.62 1.621 2.2 35)
          y=(0 0 0 0 0 0.226667 0.636667 0.856667 0.95 0.993333 0.77 0.246667 0 0 0 0 0)
      passive_force_length_curve: SimmSpline: x=(-35 0.998 0.999 1.15 1.25 1.35 1.45 1.55 1.65 1.75 1.7501 1.7502 35)
          y=(0 0 0 0 0.035 0.12 0.26 0.55 1.17 2 2 2 2)
    Schutte1993Muscle_Deprecated ADP: min_control=0 max_control=1 optimal_force=1 max_isometric_force=57.9
        optimal_fiber_length=0.0713 tendon_slack_length=0.125 pennation_angle_at_optimal=0.1308997
        max_contraction_velocity=10 time_scale=0.1 activation1=7.667 activation2=1.459854 damping=0.05
      PathPoint P1: metacarpal3 (-0.01480758 -0.02262395 0.008206793)
      PathPoint P2: metacarpal3 (-0.007319738 -0.02485136 0.03038063)
      PathPoint P3: thumb (-0.00514517 -0.02223818 0.0210981)
      PathPoint P4: thumb (-0.006246874 -0.03409386 0.03017152)
      tendon_force_length_curve: SimmSpline: x=(-10 -0.002 -0.001 0 0.00131 0.00281 0.00431 0.00581 0.00731 0.00881 0.0103 0.0118 0.0123 9.2 9.201 9.202 20)
          y=(0 0 0 0 0.0108 0.0257 0.0435 0.0652 0.0915 0.123 0.161 0.208 0.227 345 345 345 345)
      active_force_length_curve: SimmSpline: x=(-35 0 0.401 0.402 0.4035 0.52725 0.62875 0.71875 0.86125 1.045 1.2175 1.43875 1.61875 1.62 1.621 2.2 35)
          y=(0 0 0 0 0 0.226667 0.636667 0.856667 0.95 0.993333 0.77 0.246667 0 0 0 0 0)
      passive_force_length_curve: SimmSpline: x=(-35 0.998 0.999 1.15 1.25 1.35 1.45 1.55 1.65 1.75 1.7501 1.7502 35)
          y=(0 0 0 0 0.035 0.12 0.26 0.55 1.17 2 2 2 2)
    Schutte1993Muscle_Deprecated EPB: min_control=0 max_control=1 optimal_force=1 max_isometric_force=14.1
        optimal_fiber_length=0.0675 tendon_slack_length=0.11 pennation_angle_at_optimal=0.1256637
        max_contraction_velocity=10 time_scale=0.1 activation1=7.667 activation2=1.459854 damping=0.05
      PathPoint P1: radius_r (-0.008243453 -0.1340366 0.04325606)
      PathPoint P2: radius_r (-0.01017573 -0.1482067 0.0457373)
      PathPoint P3: radius_r (-0.008967723 -0.1775321 0.05924395)
      PathPoint P4: radius_r (-0.006441489 -0.1941362 0.06981399)
      PathPoint P5: radius_r (0.00469 -0.21769 0.0756)
      PathPoint P7: thumb (-0.006863398 -1.109852e-5 0.01476411)
      PathPoint P8: thumb (-0.00552973 -0.01874012 0.03299144)
      PathPoint P9: thumb (-0.007760253 -0.0276652 0.04658985)
      PathPoint P10: Tphalanx1 (-0.0003462336 -0.004510994 0.005609305)
      tendon_force_length_curve: SimmSpline: x=(-10 -0.002 -0.001 0 0.00131 0.00281 0.00431 0.00581 0.00731 0.00881 0.0103 0.0118 0.0123 9.2 9.201 9.202 20)
          y=(0 0 0 0 0.0108 0.0257 0.0435 0.0652 0.0915 0.123 0.161 0.208 0.227 345 345 345 345)
      active_force_length_curve: SimmSpline: x=(-35 0 0.401 0.402 0.4035 0.52725 0.62875 0.71875 0.86125 1.045 1.2175 1.43875 1.61875 1.62 1.621 2.2 35)
          y=(0 0 0 0 0 0.226667 0.636667 0.856667 0.95 0.993333 0.77 0.246667 0 0 0 0 0)
      passive_force_length_curve: SimmSpline: x=(-35 0.998 0.999 1.15 1.25 1.35 1.45 1.55 1.65 1.75 1.7501 1.7502 35)
          y=(0 0 0 0 0.035 0.12 0.26 0.55 1.17 2 2 2 2)
    Schutte1993Muscle_Deprecated FPB: min_control=0 max_control=1 optimal_force=1 max_isometric_force=14.1
        optimal_fiber_length=0.0675 tendon_slack_length=0.11 pennation_angle_at_optimal=0.1256637
        max_contraction_velocity=10 time_scale=0.1 activation1=7.667 activation2=1.459854 damping=0.05
      PathPoint P1: trapezium (0.009645182 -0.005892346 -0.006961706)
      PathPoint P2: thumb (0.0023653 -0.01910925 0.0165072)
      PathPoint P3: thumb (0.00136059 -0.02787166 0.02762845)
      PathPoint P4: thumb (0.002531261 -0.03726383 0.03346144)
      PathPoint P5: Tphalanx1 (0.005155732 -0.01402702 -0.002916255)
      tendon_force_length_curve: SimmSpline: x=(-10 -0.002 -0.001 0 0.00131 0.00281 0.00431 0.00581 0.00731 0.00881 0.0103 0.0118 0.0123 9.2 9.201 9.202 20)
          y=(0 0 0 0 0.0108 0.0257 0.0435 0.0652 0.0915 0.123 0.161 0.208 0.227 345 345 345 345)
      active_force_length_curve: SimmSpline: x=(-35 0 0.401 0.402 0.4035 0.52725 0.62875 0.71875 0.86125 1.045 1.2175 1.43875 1.61875 1.62 1.621 2.2 35)
          y=(0 0 0 0 0 0.226667 0.636667 0.856667 0.95 0.993333 0.77 0.246667 0 0 0 0 0)
      passive_force_length_curve: SimmSpline: x=(-35 0.998 0.999 1.15 1.25 1.35 1.45 1.55 1.65 1.75 1.7501 1.7502 35)
          y=(0 0 0 0 0.035 0.12 0.26 0.55 1.17 2 2 2 2)
    CoordinateActuator exo_base_motor: coordinate=EM_tz optimal_force=1000
    CoordinateActuator exo_fingers_motor: coordinate=EF_y optimal_force=1000
    CoordinateActuator exo_thumb_motor: coordinate=ET_z optimal_force=1000
    HuntCrossleyForce exo_avance: transition_velocity=0.1
      ContactParametersSet contact_parameters:
        ContactParameters: geometry=(platform_back platform_front exo_sphere_back exo_sphere_front) stiffness=5000000
            dissipation=100 static_friction=0.8 dynamic_friction=0.8 viscous_friction=0
    HuntCrossleyForce exo_pronosup: transition_velocity=0.1
      ContactParametersSet contact_parameters:
        ContactParameters: geometry=(platform_supin exohand_sphere_prono exohand_sphere_supin) stiffness=5000000
            dissipation=100 static_friction=0.8 dynamic_friction=0.8 viscous_friction=0
    HuntCrossleyForce exo_fingerflex: transition_velocity=0.1
      ContactParametersSet contact_parameters:
        ContactParameters: geometry=(platform_fingerflex exofingers_sphere_flex) stiffness=5000000 dissipation=100
            static_friction=0.8 dynamic_friction=0.8 viscous_friction=0
    HuntCrossleyForce exo_fingerext: transition_velocity=0.1
      ContactParametersSet contact_parameters:
        ContactParameters: geometry=(platform_fingerext exofingers_sphere_ext) stiffness=5000000 dissipation=100
            static_friction=0.8 dynamic_friction=0.8 viscous_friction=0
  ContactGeometrySet:
    ContactHalfSpace platform_back: socket_frame=/ground location=(0 -0.1 0.05) orientation=(0 -1.5708 0)
    ContactHalfSpace platform_front: socket_frame=/ground location=(0 -0.1 -0.42) orientation=(0 1.5708 0)
    ContactHalfSpace platform_supin: socket_frame=/bodyset/exobar location=(0 0.3 0) orientation=(0 0 -1.5708)
    ContactHalfSpace platform_fingerext: socket_frame=/bodyset/exohand location=(0.31 0 0) orientation=(-1.5708 0 0)
    ContactHalfSpace platform_fingerflex: socket_frame=/bodyset/exohand location=(0.15 0 0) orientation=(-1.5708 0 0)
    ContactSphere exo_sphere_back: socket_frame=/bodyset/exo_base location=(0 -0.04 0.1) radius=0.05
    ContactSphere exo_sphere_front: socket_frame=/bodyset/exo_base location=(0 -0.04 -0.2) radius=0.05
    ContactSphere exohand_sphere_prono: socket_frame=/bodyset/exohand location=(0.05 0.34 0.36) radius=0.02
    ContactSphere exohand_sphere_supin: socket_frame=/bodyset/exohand location=(0.4 0.35 0.36) radius=0.02
    ContactSphere exofingers_sphere_flex: socket_frame=/bodyset/exofingers location=(0.15 0.4 0.28) radius=0.02
    ContactSphere exofingers_sphere_ext: socket_frame=/bodyset/exofingers location=(0.25 0.4 0.25) radius=0.02
