# OpenSim document version 30000
Model gait14dof22musc_planar:
  length_units: meters
  force_units: N
  gravity: 0 -9.80665 0
  credits:
    A reduced planar gait model with 14 degrees of freedom and 22 muscles (based on planar gait9dof18 by Ajay Seth). Adjusted by Carmichael Ong to follow muscle strengths of Handsfield/Rajagopal and changed hamstrings to follow semimembranosus and to adjust passive curves of hamstrings, rect_fem, and vasti. Closely based on Delp S.L., Loan J.P., Hoy M.G., Zajac F.E., Topp E.L., Rosen J.M., Thelen D.G., Anderson F.C., Seth A. Notes: 3D, 23 DOF gait model created by D.G. Thelen, Univ. of Wisconsin-Madison, and Ajay Seth, Frank C. Anderson, and Scott L. Delp, Stanford University. Lower extremity joint defintions based on Delp et al. (1990). Low back joint and anthropometry based on Anderson and Pandy (1999, 2001). Planar knee model of Yamaguchi and Zajac (1989). Seth replaced tibia translation constraints with a CustomJoint for the knee and removed the patella to eliminate all kinematic constraints; insertions of the quadrucepts are handled with moving points in the tibia frame as defined by Delp 1990. Number of muscles was reduced by Anderson to improve simulation speed for demonstrations and is not intended to be used in research. License: Creative Commons (CCBY 3.0). You are free to distribute, remix, tweak, and build upon this work, even commercially, as long as you credit us for the original creation. http://creativecommons.org/licenses/by/3.0/ More Information: http://simtk-confluence.stanford.edu:8080/display/OpenSim/Gait+2392+and+2354+Models
  publications:
    Delp, S.L., Loan, J.P., Hoy, M.G., Zajac, F.E., Topp E.L., Rosen, J.M.: An interactive graphics-based model of the lower extremity to study orthopaedic surgical procedures, IEEE Transactions on Biomedical Engineering, vol. 37, pp. 757-767, 1990. Yamaguchi G.T., Zajac F.E.: A planar model of the knee joint to characterize the knee extensor mechanism." J . Biomech. vol. 22. pp. 1-10. 1989. Anderson F.C., Pandy M.G.: A dynamic optimization solution for vertical jumping in three dimensions. Computer Methods in Biomechanics and Biomedical Engineering 2:201-231, 1999. Anderson F.C., Pandy M.G.: Dynamic optimization of human walking. Journal of Biomechanical Engineering 123:381-390, 2001.
  BodySet:
    Body ground: mass=0 mass_center=(0 0 0) inertia_xx=0 inertia_yy=0 inertia_zz=0
    Body pelvis: mass=11.777 mass_center=(-0.0707 0 0) inertia_xx=0.1028 inertia_yy=0.0871 inertia_zz=0.0579
        meshes=(sacrum.vtp pelvis.vtp l_pelvis.vtp)
      CustomJoint ground_pelvis: parent_body=ground location_in_parent=(0 0 0) location=(0 0 0)
        SpatialTransform:
          TransformAxis rotation1: coordinates=pelvis_tilt axis=(0 0 1) LinearFunction(coefficients=1 0)
          TransformAxis rotation2: coordinates=pelvis_list axis=(1 0 0) LinearFunction(coefficients=1 0)
          TransformAxis rotation3: coordinates=pelvis_rotation axis=(0 1 0) LinearFunction(coefficients=1 0)
          TransformAxis translation1: coordinates=pelvis_tx axis=(1 0 0) LinearFunction(coefficients=1 0)
          TransformAxis translation2: coordinates=pelvis_ty axis=(0 1 0) LinearFunction(coefficients=1 0)
          TransformAxis translation3: coordinates=pelvis_tz axis=(0 0 1) LinearFunction(coefficients=1 0)
        Coordinate pelvis_tilt: motion_type=rotational default_value=0 range=(-1.570796 1.570796) clamped=false
        Coordinate pelvis_list: motion_type=rotational default_value=0 range=(-1.570796 1.570796) clamped=false
            locked=true
        Coordinate pelvis_rotation: motion_type=rotational default_value=0 range=(-1.570796 1.570796) clamped=false
            locked=true
        Coordinate pelvis_tx: motion_type=translational default_value=0 range=(-5 5) clamped=false
        Coordinate pelvis_ty: motion_type=translational default_value=0.94 range=(-1 2) clamped=false
        Coordinate pelvis_tz: motion_type=translational default_value=0 range=(-3 3) clamped=false locked=true
    Body femur_r: mass=9.3014 mass_center=(0 -0.17 0) inertia_xx=0.1339 inertia_yy=0.0351 inertia_zz=0.1412
        meshes=femur.vtp
      CustomJoint hip_r: parent_body=pelvis location_in_parent=(-0.0707 -0.0661 0.0835) location=(0 0 0)
        SpatialTransform: axes_held_at_zero=(translation1 translation2 translation3)
          TransformAxis rotation1: coordinates=hip_flexion_r axis=(0 0 1) LinearFunction(coefficients=1 0)
          TransformAxis rotation2: coordinates=hip_adduction_r axis=(1 0 0) LinearFunction(coefficients=1 0)
          TransformAxis rotation3: coordinates=hip_rotation_r axis=(0 1 0) LinearFunction(coefficients=1 0)
        Coordinate hip_flexion_r: motion_type=rotational default_value=0 range=(-2.094395 2.094395) clamped=false
        Coordinate hip_adduction_r: motion_type=rotational default_value=0 range=(-2.094395 2.094395) clamped=false
            locked=true
        Coordinate hip_rotation_r: motion_type=rotational default_value=0 range=(-2.094395 2.094395) clamped=false
            locked=true
    Body tibia_r: mass=3.7075 mass_center=(0 -0.1867 0) inertia_xx=0.0504 inertia_yy=0.0051 inertia_zz=0.0511
        meshes=(tibia.vtp fibula.vtp)
      CustomJoint knee_r: parent_body=femur_r location_in_parent=(0 0 0) location=(0 0 0)
        Coordinate knee_angle_r: motion_type=rotational default_value=0 range=(-2.094395 0.1745329) clamped=false
        SpatialTransform: axes_held_at_zero=(rotation2 rotation3 translation3)
          TransformAxis rotation1: coordinates=knee_angle_r axis=(0 0 1) LinearFunction(coefficients=1 0)
          TransformAxis translation1: coordinates=knee_angle_r axis=(1 0 0)
            SimmSpline: x=(-2.0944 -1.74533 -1.39626 -1.0472 -0.698132 -0.349066 -0.174533 0.197344 0.337395 0.490178 1.52146 2.0944)
                y=(-0.0032 0.00179 0.00411 0.0041 0.00212 -0.001 -0.0031 -0.005227 -0.005435 -0.005574 -0.005435 -0.00525)
          TransformAxis translation2: coordinates=knee_angle_r axis=(0 1 0)
            SimmSpline: x=(-2.0944 -1.22173 -0.523599 -0.349066 -0.174533 0.159149 2.0944)
                y=(-0.4226 -0.4082 -0.399 -0.3976 -0.3966 -0.395264 -0.396)
    Body talus_r: mass=0.1 mass_center=(0 0 0) inertia_xx=0.001 inertia_yy=0.001 inertia_zz=0.001 meshes=talus.vtp
      PinJoint ankle_r: parent_body=tibia_r location_in_parent=(0 -0.43 0) location=(0 0 0)
        Coordinate ankle_angle_r: motion_type=rotational default_value=0 range=(-1.570796 1.570796) clamped=false
    Body calcn_r: mass=1.25 mass_center=(0.1 0.03 0) inertia_xx=0.0014 inertia_yy=0.0039 inertia_zz=0.0041
        meshes=foot.vtp
      WeldJoint subtalar_r: parent_body=talus_r location_in_parent=(-0.04877 -0.04195 0.00792) location=(0 0 0)
    Body toes_r: mass=0.2166 mass_center=(0.0346 0.006 -0.0175) inertia_xx=0.0001 inertia_yy=0.0002 inertia_zz=0.0001
        meshes=bofoot.vtp
      WeldJoint mtp_r: parent_body=calcn_r location_in_parent=(0.1788 -0.002 0.00108) location=(0 0 0)
    Body femur_l: mass=9.3014 mass_center=(0 -0.17 0) inertia_xx=0.1339 inertia_yy=0.0351 inertia_zz=0.1412
        meshes=l_femur.vtp
      CustomJoint hip_l: parent_body=pelvis location_in_parent=(-0.0707 -0.0661 -0.0835) location=(0 0 0)
        SpatialTransform: axes_held_at_zero=(translation1 translation2 translation3)
          TransformAxis rotation1: coordinates=hip_flexion_l axis=(0 0 1) LinearFunction(coefficients=1 0)
          TransformAxis rotation2: coordinates=hip_adduction_l axis=(-1 0 0) LinearFunction(coefficients=1 0)
          TransformAxis rotation3: coordinates=hip_rotation_l axis=(0 -1 0) LinearFunction(coefficients=1 0)
        Coordinate hip_flexion_l: motion_type=rotational default_value=0 range=(-2.094395 2.094395) clamped=false
        Coordinate hip_adduction_l: motion_type=rotational default_value=0 range=(-2.094395 2.094395) clamped=false
            locked=true
        Coordinate hip_rotation_l: motion_type=rotational default_value=0 range=(-2.094395 2.094395) clamped=false
            locked=true
    Body tibia_l: mass=3.7075 mass_center=(0 -0.1867 0) inertia_xx=0.0504 inertia_yy=0.0051 inertia_zz=0.0511
        meshes=(l_tibia.vtp l_fibula.vtp)
      CustomJoint knee_l: parent_body=femur_l location_in_parent=(0 0 0) location=(0 0 0)
        Coordinate knee_angle_l: motion_type=rotational default_value=0 range=(-2.094395 0.1745329) clamped=false
        SpatialTransform: axes_held_at_zero=(rotation2 rotation3 translation3)
          TransformAxis rotation1: coordinates=knee_angle_l axis=(0 0 1) LinearFunction(coefficients=1 0)
          TransformAxis translation1: coordinates=knee_angle_l axis=(1 0 0)
            SimmSpline: x=(-2.0944 -1.74533 -1.39626 -1.0472 -0.698132 -0.349066 -0.174533 0.197344 0.337395 0.490178 1.52146 2.0944)
                y=(-0.0032 0.00179 0.00411 0.0041 0.00212 -0.001 -0.0031 -0.005227 -0.005435 -0.005574 -0.005435 -0.00525)
          TransformAxis translation2: coordinates=knee_angle_l axis=(0 1 0)
            SimmSpline: x=(-2.0944 -1.22173 -0.523599 -0.349066 -0.174533 0.159149 2.0944)
                y=(-0.4226 -0.4082 -0.399 -0.3976 -0.3966 -0.395264 -0.396)
    Body talus_l: mass=0.1 mass_center=(0 0 0) inertia_xx=0.001 inertia_yy=0.001 inertia_zz=0.001 meshes=l_talus.vtp
      PinJoint ankle_l: parent_body=tibia_l location_in_parent=(0 -0.43 0) location=(0 0 0)
        Coordinate ankle_angle_l: motion_type=rotational default_value=0 range=(-1.047198 1.047198) clamped=false
    Body calcn_l: mass=1.25 mass_center=(0.1 0.03 0) inertia_xx=0.0014 inertia_yy=0.0039 inertia_zz=0.0041
        meshes=l_foot.vtp
      WeldJoint subtalar_l: parent_body=talus_l location_in_parent=(-0.04877 -0.04195 -0.00792) location=(0 0 0)
    Body toes_l: mass=0.2166 mass_center=(0.0346 0.006 0.0175) inertia_xx=0.0001 inertia_yy=0.0002 inertia_zz=0.0001
        meshes=l_bofoot.vtp
      WeldJoint mtp_l: parent_body=calcn_l location_in_parent=(0.1788 -0.002 -0.00108) location=(0 0 0)
    Body torso: mass=34.2366 mass_center=(-0.03 0.32 0) inertia_xx=1.4745 inertia_yy=0.7555 inertia_zz=1.4314
        meshes=(hat_spine.vtp hat_jaw.vtp hat_skull.vtp hat_ribs.vtp)
      PinJoint back: parent_body=pelvis location_in_parent=(-0.1007 0.0815 0) location=(0 0 0)
        Coordinate lumbar_extension: motion_type=rotational default_value=-0.0872665 range=(-1.570796 1.570796)
            clamped=false locked=true
    Body head: mass=0 mass_center=(0 0 0) inertia_xx=0 inertia_yy=0 inertia_zz=0
      WeldJoint back_0: parent_body=torso location_in_parent=(0 0.55 0) location=(0 0 0)
    Body Efoot_r: mass=0.955 mass_center=(0 0 0) inertia_xx=0.0028 inertia_yy=0.0093 inertia_zz=0.0074
        inertia_xz=0.0011 meshes=foot_r1v1.obj
      PinJoint exo_joint_ankle_r: parent_body=Eshin_r location_in_parent=(0 -0.21505 0) location=(-0.09 0 0.07)
        Coordinate exo_ankle_r: motion_type=rotational default_value=-0.1709012 range=(-1 1) clamped=false
    Body Efoot_l: mass=0.955 mass_center=(0 0 0) inertia_xx=0.0028 inertia_yy=0.0093 inertia_zz=0.0074
        inertia_xz=-0.0011 meshes=foot_l1v1.obj
      PinJoint exo_joint_ankle_l: parent_body=Eshin_l location_in_parent=(0 -0.21505 0) location=(-0.09 0 -0.07)
        Coordinate exo_ankle_l: motion_type=rotational default_value=0.1745329 range=(-1 1) clamped=false
    Body Eshin_r: mass=0.530145 mass_center=(0 0 0) inertia_xx=0.012716 inertia_yy=0.000187 inertia_zz=0.0128095
        inertia_xy=-0.0002805 inertia_yz=-9.35e-5 meshes=shin_r1v1.obj
      PinJoint exo_joint_knee_r: parent_body=Efemur_r location_in_parent=(0 -0.207375 0) location=(-0.005 0.208038 0)
        Coordinate exo_knee_r: motion_type=rotational default_value=-0.3231075 range=(-1.57 0) clamped=false
    Body Eshin_l: mass=0.530145 mass_center=(0 0 0) inertia_xx=0.012716 inertia_yy=0.000187 inertia_zz=0.0128095
        inertia_xy=-0.0002805 inertia_yz=9.35e-5 meshes=shin_l1v1.obj
      PinJoint exo_joint_knee_l: parent_body=Efemur_l location_in_parent=(0 -0.207375 0) location=(-0.005 0.208038 0)
        Coordinate exo_knee_l: motion_type=rotational default_value=-0.8041966 range=(-1.57 0) clamped=false
    Body Efemur_r: mass=2.331 mass_center=(0 0 0) inertia_xx=0.031185 inertia_yy=0.002835 inertia_zz=0.033075
        inertia_xy=0.000315 inertia_yz=0.00021 meshes=femur_r1v1.obj
      PinJoint exo_joint_hip_r: parent_body=Ehip_r location_in_parent=(0.16 -0.06 0.07865)
          orientation_in_parent=(0 0 0.1) location=(0 0.21 0)
        Coordinate exo_hip_r: motion_type=rotational default_value=0.6952391 range=(-1.57 1.57) clamped=false
    Body Efemur_l: mass=2.331 mass_center=(0 0 0) inertia_xx=0.031185 inertia_yy=0.002835 inertia_zz=0.033075
        inertia_xy=0.000315 inertia_yz=-0.00021 meshes=femur_l1v1.obj
      PinJoint exo_joint_hip_l: parent_body=Ehip_l location_in_parent=(0.16 -0.06 -0.07865)
          orientation_in_parent=(0 0 0.1) location=(0 0.21 0)
        Coordinate exo_hip_l: motion_type=rotational default_value=0.05282324 range=(-1.57 1.57) clamped=false
    Body Etrunk_m: mass=5.27 mass_center=(0 0 0) inertia_xx=0.0751 inertia_yy=0.114 inertia_zz=0.1202
        inertia_xy=-0.0092 inertia_xz=0.0002 meshes=trunk_v1.obj
      WeldJoint trunk_ab: parent_body=torso location_in_parent=(-0.04 0.04 0) location=(0 0 0)
    Body Ehip_r: mass=3.23245 mass_center=(0 0 0) inertia_xx=0.0751 inertia_yy=0.114 inertia_zz=0.1202
        inertia_xy=-0.0092 inertia_xz=0.0002 meshes=hip_r1v1.obj
      WeldJoint hip_fix_r: parent_body=Etrunk_m location_in_parent=(-0.078 -0.119 0.11) location=(0 0.007 0)
    Body Ehip_l: mass=3.23245 mass_center=(0 0 0) inertia_xx=0.0751 inertia_yy=0.114 inertia_zz=0.1202
        inertia_xy=-0.0092 inertia_xz=0.0002 meshes=hip_l1v1.obj
      WeldJoint hip_fix_l: parent_body=Etrunk_m location_in_parent=(-0.078 -0.119 -0.11) location=(0 0.007 0)
    Body Emotor_r: mass=2 mass_center=(0 0 0) inertia_xx=0.0081 inertia_yy=0.0073 inertia_zz=0.0026 inertia_yz=0.0002
        meshes=motor_r1v1.obj
      WeldJoint motor_fix_hip_r: parent_body=Ehip_r location_in_parent=(-0.04 0.156 -0.0065) location=(0 0 0)
    Body Emotor_l: mass=2 mass_center=(0 0 0) inertia_xx=0.0081 inertia_yy=0.0073 inertia_zz=0.0026 inertia_yz=-0.0002
        meshes=motor_l1v1.obj
      WeldJoint motor_fix_hip_l: parent_body=Ehip_l location_in_parent=(-0.04 0.156 0.0065) location=(0 0 0)
  ConstraintSet:
    PointOnLineConstraint femur_strap_constraint_r: line_body=femur_r line_direction_vec=(-0.00870763 -0.411483 0)
        point_on_line=(-0.00870763 -0.411483 0) follower_body=Efemur_r
        point_on_follower=(-0.00113535 -0.203096 -0.10515)
    PointOnLineConstraint tibia_strap_constraint_r: line_body=tibia_r line_direction_vec=(0.00417833 -0.4143371 0)
        point_on_line=(0 -0.43 0) follower_body=Eshin_r point_on_follower=(0.00667242 -0.201712 -0.10515)
    PointOnLineConstraint toe_strap_constraint_r_pointonline: line_body=toes_r line_direction_vec=(0.05 0 0)
        point_on_line=(0.05 0 0) follower_body=Efoot_r point_on_follower=(0.0967945 -0.0255274 -0.02615)
    PointOnLineConstraint femur_strap_constraint_l: line_body=femur_l line_direction_vec=(-0.00871682 -0.411483 0)
        point_on_line=(-0.00871682 -0.411483 0) follower_body=Efemur_l
        point_on_follower=(-0.00106174 -0.203091 0.10515)
    PointOnLineConstraint tibia_strap_constraint_l: line_body=tibia_l line_direction_vec=(0.00417833 -0.414337 0)
        point_on_line=(0 -0.43 0) follower_body=Eshin_l point_on_follower=(0.00667242 -0.201712 0.10515)
    PointOnLineConstraint toe_strap_constraint_l_pointonline: line_body=toes_l line_direction_vec=(0.05 0 0)
        point_on_line=(0.05 0 0) follower_body=Efoot_l point_on_follower=(0.0973462 -0.0241057 0.02615)
  ForceSet:
    Thelen2003Muscle [values shared by the 22 below unless stated]: min_control=0 max_control=1 optimal_force=1
        max_contraction_velocity=15 activation_time_constant=0.01 deactivation_time_constant=0.04
        FmaxTendonStrain=0.049
    Thelen2003Muscle abd_r: max_isometric_force=4460.29 optimal_fiber_length=0.0845 tendon_slack_length=0.053
        pennation_angle_at_optimal=0 [radians]
      PathPoint glut_med2_r-P1: pelvis (-0.0855 0.0445 0.0766)
      PathPoint glut_med2_r-P2: femur_r (-0.0258 -0.0058 0.0527)
    Thelen2003Muscle add_r: max_isometric_force=3931.8 optimal_fiber_length=0.087 tendon_slack_length=0.06
        pennation_angle_at_optimal=0.08726646
      PathPoint add_mag1_r-P1: pelvis (-0.0732 -0.1174 0.0255)
      PathPoint add_mag1_r-P2: femur_r (-0.0045 -0.1211 0.0339)
    Thelen2003Muscle hamstrings_r: max_isometric_force=4105.466 optimal_fiber_length=0.069 tendon_slack_length=0.349
        pennation_angle_at_optimal=0.2617994 FmaxMuscleStrain=0.8
      PathPoint semimem_r-P1: pelvis (-0.1192 -0.09747 0.07151)
      ConditionalPathPoint semimem_r-P2: tibia_r (-0.0348 -0.03519 -0.01891) range=(-0.558505 0.174533)
          coordinate=knee_angle_r
      PathPoint semimem_r-P3: tibia_r (-0.027 -0.04771 -0.01957)
    Thelen2003Muscle bifemsh_r: max_isometric_force=557.1148 optimal_fiber_length=0.11 tendon_slack_length=0.117
        pennation_angle_at_optimal=0.4014257
      PathPoint P1: femur_r (0.005 -0.2111 0.0234)
      PathPoint P2: tibia_r (-0.0301 -0.036 0.02943)
      PathPoint P3: tibia_r (-0.0234 -0.0563 0.0343)
    Thelen2003Muscle glut_max_r: max_isometric_force=3337.584 optimal_fiber_length=0.157 tendon_slack_length=0.048
        pennation_angle_at_optimal=0
      PathPoint glut_max2_r-P1: pelvis (-0.1349 0.0176 0.0563)
      PathPoint glut_max2_r-P2: pelvis (-0.1376 -0.052 0.0914)
      PathPoint glut_max2_r-P3: femur_r (-0.0426 -0.053 0.0293)
      PathPoint glut_max2_r-P4: femur_r (-0.0156 -0.1016 0.0419)
    Thelen2003Muscle iliopsoas_r: max_isometric_force=2697.344 optimal_fiber_length=0.117 tendon_slack_length=0.13
        pennation_angle_at_optimal=0.1396263
      PathPoint psoas_r-P1: pelvis (-0.0647 0.0887 0.0289)
      PathPoint psoas_r-P2: pelvis (-0.0238 -0.057 0.0759)
      ConditionalPathPoint psoas_r-P3: pelvis (-0.0288 -0.0805 0.0816) range=(-1.5708 0.785398)
          coordinate=hip_flexion_r
      PathPoint psoas_r-P4: femur_r (0.0016 -0.0507 0.0038)
      PathPoint psoas_r-P5: femur_r (-0.0188 -0.0597 0.0104)
    Thelen2003Muscle rect_fem_r: max_isometric_force=2191.741 optimal_fiber_length=0.076 tendon_slack_length=0.346
        pennation_angle_at_optimal=0.08726646 FmaxMuscleStrain=1 KshapePassive=9
      PathPoint P1: pelvis (-0.0295 -0.0311 0.0968)
      ConditionalPathPoint P2: femur_r (0.0334 -0.403 0.0019) range=(-2.61799 -1.45997) coordinate=knee_angle_r
      MovingPathPoint P3: tibia_r (0.0617576 0.020984 0.0014) x_coordinate=knee_angle_r y_coordinate=knee_angle_r
          z_coordinate=knee_angle_r
        x_location: SimmSpline: x=(-2.0944 -1.99997 -1.5708 -1.45752 -1.39626 -1.0472 -0.698132 -0.526391 -0.349066 -0.174533 0 0.00017453 0.00034907 0.0279253 0.0872665 0.174533 2.0944)
            y=(0.0155805 0.0179938 0.0275081 0.0296564 0.0307615 0.0365695 0.0422074 0.0450902 0.048391 0.0534299 0.0617576 0.0617669 0.0617762 0.0633083 0.066994 0.0733035 0.0573481)
        y_location: SimmSpline: x=(-2.0944 -1.99997 -1.5708 -1.45752 -1.39626 -1.0472 -0.698132 -0.526391 -0.349066 -0.174533 0 0.00017453 0.00034907 0.0279253 0.0872665 0.174533 2.0944)
            y=(0.0234116 0.0237613 0.0251141 0.0252795 0.0253146 0.0249184 0.0242373 0.0238447 0.0234197 0.0227644 0.020984 0.0209814 0.0209788 0.0205225 0.0191754 0.0159554 -0.0673774)
        z_location: SimmSpline: x=(-2.0944 0.1745) y=(0.0014 0.0014)
    Thelen2003Muscle vasti_r: max_isometric_force=9593.951 optimal_fiber_length=0.099 tendon_slack_length=0.102
        pennation_angle_at_optimal=0.05235988 FmaxMuscleStrain=1 KshapePassive=9
      PathPoint vas_int_r-P1: femur_r (0.029 -0.1924 0.031)
      PathPoint vas_int_r-P2: femur_r (0.0335 -0.2084 0.0285)
      ConditionalPathPoint vas_int_r-P3: femur_r (0.0343 -0.403 0.0055) range=(-2.61799 -1.42) coordinate=knee_angle_r
      MovingPathPoint vas_int_r-P4: tibia_r (0.0554632 0.0252923 0.0018) x_coordinate=knee_angle_r
          y_coordinate=knee_angle_r z_coordinate=knee_angle_r
        x_location: SimmSpline: x=(-2.0944 -1.99997 -1.5708 -1.45752 -1.39626 -1.0472 -0.698132 -0.526391 -0.349066 -0.174533 0 0.00017453 0.00034907 0.0279253 0.0872665 0.174533 2.0944)
            y=(0.0082733 0.0106866 0.0202042 0.022353 0.0234583 0.0292715 0.0349465 0.037871 0.0412569 0.0465287 0.0554632 0.0554735 0.0554837 0.0571717 0.061272 0.0684368 0.0648818)
        y_location: SimmSpline: x=(-2.0944 -1.99997 -1.5708 -1.45752 -1.39626 -1.0472 -0.698132 -0.526391 -0.349066 -0.174533 0 0.00017453 0.00034907 0.0279253 0.0872665 0.174533 2.0944)
            y=(0.025599 0.0259487 0.0273124 0.0274796 0.0275151 0.0271363 0.0265737 0.0263073 0.0261187 0.0260129 0.0252923 0.0252911 0.0252898 0.0250526 0.0242191 0.0218288 -0.0685706)
        z_location: SimmSpline: x=(-2.0944 2.0944) y=(0.0018 0.0018)
    Thelen2003Muscle gastroc_r: max_isometric_force=4690.574 optimal_fiber_length=0.051 tendon_slack_length=0.384
        pennation_angle_at_optimal=0.296706 FmaxTendonStrain=0.1
      PathPoint med_gas_r-P1: femur_r (-0.019 -0.3929 -0.0235)
      ConditionalPathPoint med_gas_r-P2: femur_r (-0.03 -0.4022 -0.0258) range=(-0.785398 0.174533)
          coordinate=knee_angle_r
      PathPoint med_gas_r-P3: calcn_r (0 0.031 -0.0053)
    Thelen2003Muscle soleus_r: max_isometric_force=7924.997 optimal_fiber_length=0.044 tendon_slack_length=0.244
        pennation_angle_at_optimal=0.4363323 FmaxTendonStrain=0.1
      PathPoint P1: tibia_r (-0.0024 -0.1533 0.0071)
      PathPoint P2: calcn_r (0 0.031 -0.0053)
    Thelen2003Muscle tib_ant_r: max_isometric_force=2116.818 optimal_fiber_length=0.068 tendon_slack_length=0.238
        pennation_angle_at_optimal=0.08726646
      PathPoint P1: tibia_r (0.0179 -0.1624 0.0115)
      PathPoint P2: tibia_r (0.0329 -0.3951 -0.0177)
      PathPoint P3: calcn_r (0.1166 0.0178 -0.0305)
    Thelen2003Muscle abd_l: max_isometric_force=4460.29 optimal_fiber_length=0.0845 tendon_slack_length=0.053
        pennation_angle_at_optimal=0
      PathPoint glut_med2_l-P1: pelvis (-0.0855 0.0445 -0.0766)
      PathPoint glut_med2_l-P2: femur_l (-0.0258 -0.0058 -0.0527)
    Thelen2003Muscle add_l: max_isometric_force=3931.8 optimal_fiber_length=0.087 tendon_slack_length=0.06
        pennation_angle_at_optimal=0.08726646
      PathPoint add_mag1_l-P1: pelvis (-0.0732 -0.1174 -0.0255)
      PathPoint add_mag1_l-P2: femur_l (-0.0045 -0.1211 -0.0339)
    Thelen2003Muscle hamstrings_l: max_isometric_force=4105.466 optimal_fiber_length=0.069 tendon_slack_length=0.349
        pennation_angle_at_optimal=0.2617994 FmaxMuscleStrain=0.8
      PathPoint semimem_l-P1: pelvis (-0.1192 -0.09747 -0.07151)
      ConditionalPathPoint semimem_l-P2: tibia_l (-0.0348 -0.03519 0.01891) range=(-0.558505 0.174533)
          coordinate=knee_angle_l
      PathPoint semimem_l-P3: tibia_l (-0.027 -0.04771 0.01957)
    Thelen2003Muscle bifemsh_l: max_isometric_force=557.1148 optimal_fiber_length=0.11 tendon_slack_length=0.117
        pennation_angle_at_optimal=0.4014257
      PathPoint P1: femur_l (0.005 -0.2111 -0.0234)
      PathPoint P2: tibia_l (-0.0301 -0.036 -0.02943)
      PathPoint P3: tibia_l (-0.0234 -0.0563 -0.0343)
    Thelen2003Muscle glut_max_l: max_isometric_force=3337.584 optimal_fiber_length=0.157 tendon_slack_length=0.048
        pennation_angle_at_optimal=0
      PathPoint glut_max2_l-P1: pelvis (-0.1349 0.0176 -0.0563)
      PathPoint glut_max2_l-P2: pelvis (-0.1376 -0.052 -0.0914)
      PathPoint glut_max2_l-P3: femur_l (-0.0426 -0.053 -0.0293)
      PathPoint glut_max2_l-P4: femur_l (-0.0156 -0.1016 -0.0419)
    Thelen2003Muscle iliopsoas_l: max_isometric_force=2697.344 optimal_fiber_length=0.117 tendon_slack_length=0.13
        pennation_angle_at_optimal=0.1396263
      PathPoint psoas_l-P1: pelvis (-0.0647 0.0887 -0.0289)
      PathPoint psoas_l-P2: pelvis (-0.0238 -0.057 -0.0759)
      ConditionalPathPoint psoas_l-P3: pelvis (-0.0288 -0.0805 -0.0816) range=(-1.5708 0.785398)
          coordinate=hip_flexion_l
      PathPoint psoas_l-P4: femur_l (0.0016 -0.0507 -0.0038)
      PathPoint psoas_l-P5: femur_l (-0.0188 -0.0597 -0.0104)
    Thelen2003Muscle rect_fem_l: max_isometric_force=2191.741 optimal_fiber_length=0.076 tendon_slack_length=0.346
        pennation_angle_at_optimal=0.08726646 FmaxMuscleStrain=1 KshapePassive=9
      PathPoint P1: pelvis (-0.0295 -0.0311 -0.0968)
      ConditionalPathPoint P2: femur_l (0.0334 -0.403 -0.0019) range=(-2.61799 -1.45997) coordinate=knee_angle_l
      MovingPathPoint P3: tibia_l (0.0617576 0.020984 -0.0014) x_coordinate=knee_angle_l y_coordinate=knee_angle_l
          z_coordinate=knee_angle_l
        x_location: SimmSpline: x=(-2.0944 -1.99997 -1.5708 -1.45752 -1.39626 -1.0472 -0.698132 -0.526391 -0.349066 -0.174533 0 0.00017453 0.00034907 0.0279253 0.0872665 0.174533 2.0944)
            y=(0.0155805 0.0179938 0.0275081 0.0296564 0.0307615 0.0365695 0.0422074 0.0450902 0.048391 0.0534299 0.0617576 0.0617669 0.0617762 0.0633083 0.066994 0.0733035 0.0573481)
        y_location: SimmSpline: x=(-2.0944 -1.99997 -1.5708 -1.45752 -1.39626 -1.0472 -0.698132 -0.526391 -0.349066 -0.174533 0 0.00017453 0.00034907 0.0279253 0.0872665 0.174533 2.0944)
            y=(0.0234116 0.0237613 0.0251141 0.0252795 0.0253146 0.0249184 0.0242373 0.0238447 0.0234197 0.0227644 0.020984 0.0209814 0.0209788 0.0205225 0.0191754 0.0159554 -0.0673774)
        z_location: SimmSpline: x=(-2.0944 0.1745) y=(-0.0014 -0.0014)
    Thelen2003Muscle vasti_l: max_isometric_force=9593.951 optimal_fiber_length=0.099 tendon_slack_length=0.102
        pennation_angle_at_optimal=0.05235988 FmaxMuscleStrain=1 KshapePassive=9
      PathPoint vas_int_l-P1: femur_l (0.029 -0.1924 -0.031)
      PathPoint vas_int_l-P2: femur_l (0.0335 -0.2084 -0.0285)
      ConditionalPathPoint vas_int_l-P3: femur_l (0.0343 -0.403 -0.0055) range=(-2.61799 -1.42) coordinate=knee_angle_l
      MovingPathPoint vas_int_l-P4: tibia_l (0.0554632 0.0252923 -0.0018) x_coordinate=knee_angle_l
          y_coordinate=knee_angle_l z_coordinate=knee_angle_l
        x_location: SimmSpline: x=(-2.0944 -1.99997 -1.5708 -1.45752 -1.39626 -1.0472 -0.698132 -0.526391 -0.349066 -0.174533 0 0.00017453 0.00034907 0.0279253 0.0872665 0.174533 2.0944)
            y=(0.0082733 0.0106866 0.0202042 0.022353 0.0234583 0.0292715 0.0349465 0.037871 0.0412569 0.0465287 0.0554632 0.0554735 0.0554837 0.0571717 0.061272 0.0684368 0.0648818)
        y_location: SimmSpline: x=(-2.0944 -1.99997 -1.5708 -1.45752 -1.39626 -1.0472 -0.698132 -0.526391 -0.349066 -0.174533 0 0.00017453 0.00034907 0.0279253 0.0872665 0.174533 2.0944)
            y=(0.025599 0.0259487 0.0273124 0.0274796 0.0275151 0.0271363 0.0265737 0.0263073 0.0261187 0.0260129 0.0252923 0.0252911 0.0252898 0.0250526 0.0242191 0.0218288 -0.0685706)
        z_location: SimmSpline: x=(-2.0944 2.0944) y=(-0.0018 -0.0018)
    Thelen2003Muscle gastroc_l: max_isometric_force=4690.574 optimal_fiber_length=0.051 tendon_slack_length=0.384
        pennation_angle_at_optimal=0.296706 FmaxTendonStrain=0.1
      PathPoint med_gas_l-P1: femur_l (-0.019 -0.3929 0.0235)
      ConditionalPathPoint med_gas_l-P2: femur_l (-0.03 -0.4022 0.0258) range=(-0.785398 0.174533)
          coordinate=knee_angle_l
      PathPoint med_gas_l-P3: calcn_l (0 0.031 0.0053)
    Thelen2003Muscle soleus_l: max_isometric_force=7924.997 optimal_fiber_length=0.044 tendon_slack_length=0.244
        pennation_angle_at_optimal=0.4363323 FmaxTendonStrain=0.1
      PathPoint P1: tibia_l (-0.0024 -0.1533 -0.0071)
      PathPoint P2: calcn_l (0 0.031 0.0053)
    Thelen2003Muscle tib_ant_l: max_isometric_force=2116.818 optimal_fiber_length=0.068 tendon_slack_length=0.238
        pennation_angle_at_optimal=0.08726646
      PathPoint P1: tibia_l (0.0179 -0.1624 -0.0115)
      PathPoint P2: tibia_l (0.0329 -0.3951 0.0177)
      PathPoint P3: calcn_l (0.1166 0.0178 0.0305)
    HuntCrossleyForce foot_r: transition_velocity=0.1
      ContactParametersSet contact_parameters:
        ContactParameters: geometry=(platform r_heel r_toe1 r_toe2) stiffness=500000 dissipation=1 static_friction=0.8
            dynamic_friction=0.8 viscous_friction=0
    HuntCrossleyForce foot_l: transition_velocity=0.1
      ContactParametersSet contact_parameters:
        ContactParameters: geometry=(platform l_heel l_toe1 l_toe2) stiffness=500000 dissipation=1 static_friction=0.8
            dynamic_friction=0.8 viscous_friction=0
    CoordinateLimitForce [values shared by the 8 below unless stated]: upper_stiffness=20 [N*m/degree]
        lower_stiffness=20 [N*m/degree] damping=0.25 transition=10 [degrees]
    CoordinateLimitForce HipLimit_r: coordinate=hip_flexion_r upper_limit=120 [degrees] lower_limit=-30 [degrees]
    CoordinateLimitForce HipLimit_l: coordinate=hip_flexion_l upper_limit=120 lower_limit=-30
    CoordinateLimitForce KneeLimit_r: coordinate=knee_angle_r upper_limit=0 lower_limit=-140
    CoordinateLimitForce KneeLimit_l: coordinate=knee_angle_l upper_limit=0 lower_limit=-140
    CoordinateLimitForce AnkleLimit_r: coordinate=ankle_angle_r upper_limit=20 lower_limit=-40
    CoordinateLimitForce AnkleLimit_l: coordinate=ankle_angle_l upper_limit=20 lower_limit=-40
    CoordinateLimitForce HipAddLimit_r: coordinate=hip_adduction_r upper_limit=30 lower_limit=-40
    CoordinateLimitForce HipAddLimit_l: coordinate=hip_adduction_l upper_limit=30 lower_limit=-40
    CoordinateActuator exo_ankle_motor_r: coordinate=exo_ankle_r
    CoordinateActuator exo_ankle_motor_l: coordinate=exo_ankle_l
    CoordinateActuator exo_knee_motor_r: coordinate=exo_knee_r
    CoordinateActuator exo_knee_motor_l: coordinate=exo_knee_l
    CoordinateActuator exo_hip_motor_flex_right: coordinate=exo_hip_r
    CoordinateActuator exo_hip_motor_flex_left: coordinate=exo_hip_l
  MarkerSet:
    Marker hip_joint_r_ref_pelvis: pelvis (-0.0707 -0.0661 0.0835)
    Marker hip_joint_r_ref_femur: femur_r (0 0 0)
    Marker knee_joint_r_ref_tibia: tibia_r (0 0 0)
    Marker ankle_joint_r_ref_talus: talus_r (0.15 -0.05 0)
    Marker ankle_joint_l_ref_talus: talus_l (0.15 -0.05 0)
    Marker knee_joint_l_ref_tibia: tibia_l (0 0 0)
    Marker knee_joint_center_r_femur: femur_r (-0.00870763 -0.411483 0) fixed=true
    Marker knee_joint_center_l_femur: femur_l (-0.00871682 -0.411483 0)
    Marker constraint_point_right_pelvis_femur: pelvis (-0.0734417 -0.480698 0.0835)
    Marker constraint_point_right_efemur_femur: Efemur_r (-0.00113535 -0.203096 -0.10515)
    Marker constraint_point_right_ehip_femur: Ehip_r (0.194153 -0.471683 -0.0265)
    Marker constraint_point_left_pelvis_femur: pelvis (-0.0734417 -0.480698 -0.0835)
    Marker constraint_point_left_efemur_femur: Efemur_l (-0.00113535 -0.203096 0.10515)
    Marker constraint_point_left_ehip_femur: Ehip_l (0.194153 -0.471683 0.0265)
    Marker Ehip_r_etrunk_m: Etrunk_m (0.082 -0.186 0.186513)
  ContactGeometrySet:
    ContactHalfSpace platform: body_name=ground location=(0 0 0) orientation=(0 0 -1.570796)
    ContactSphere r_heel: body_name=Efoot_r location=(-0.11 -0.04 0) radius=0.05
    ContactSphere r_toe1: body_name=Efoot_r location=(0.07 -0.058 -0.026) radius=0.025
    ContactSphere r_toe2: body_name=Efoot_r location=(0.07 -0.058 0.026) radius=0.025
    ContactSphere l_heel: body_name=Efoot_l location=(-0.11 -0.04 0) radius=0.05
    ContactSphere l_toe1: body_name=Efoot_l location=(0.07 -0.058 -0.026) radius=0.025
    ContactSphere l_toe2: body_name=Efoot_l location=(0.07 -0.058 0.026) radius=0.025
    ContactMesh Efoot_r_contact: body_name=calcn_r location=(0 -0.05 0.005) filename=test_v3_foot_rect.obj
      # Location of geometry center in the body frame
    ContactMesh Efoot_l_contact: body_name=calcn_l location=(0 -0.05 -0.005) filename=test_v3_foot_rect.obj
      # Location of geometry center in the body frame
